# OpenSim document version 30000
CMC_TaskSet gait10dof_kinematics_tracking_tasks:
  defaults: CMC_Joint default: on=false weight=(1 1 1) wrt_body=-1 express_body=-1 active=(false false false)
      kp=(1 1 1) kv=(1 1 1) ka=(1 1 1) r0=(0 0 0) r1=(0 0 0) r2=(0 0 0) limit=0
  CMC_Joint [values shared by the 11 below unless stated]: weight=250 active=(true false false) kp=100 kv=20
  CMC_Joint gear_rotation: coordinate=gear_rotation
  CMC_Joint pedal_rotation_r: coordinate=pedal_rotation_r
  CMC_Joint pedal_rotation_l: coordinate=pedal_rotation_l
  CMC_Joint hip_flexion_r: coordinate=hip_flexion_r
  CMC_Joint hip_adduction_r: coordinate=hip_adduction_r
  CMC_Joint hip_rotation_r: coordinate=hip_rotation_r
  CMC_Joint knee_angle_r: weight=200 coordinate=knee_angle_r
  CMC_Joint hip_flexion_l: coordinate=hip_flexion_l
  CMC_Joint hip_adduction_l: coordinate=hip_adduction_l
  CMC_Joint hip_rotation_l: coordinate=hip_rotation_l
  CMC_Joint knee_angle_l: weight=200 coordinate=knee_angle_l
