# OpenSim document version 30000
Model bicycle:
  credits: Dimitris Boulgarakis, Dimitar Stanev, Konstantinos Moustakas
  length_units: meters
  force_units: N
  gravity: 0 -9.80665 0
  BodySet:
    Body ground: mass=0 mass_center=(0 0 0) inertia_xx=1 inertia_yy=1 inertia_zz=1
    Body frame: mass=10 mass_center=(0 0 0) inertia_xx=1 inertia_yy=1 inertia_zz=1 meshes=geometry/frame.obj
      WeldJoint frame_ground: parent_body=ground location_in_parent=(0 0 0) location=(0 0 0)
    Body saddle: mass=0.3 mass_center=(0 0 0) inertia_xx=1 inertia_yy=1 inertia_zz=1 meshes=geometry/saddle.obj
      WeldJoint saddle_frame: parent_body=frame location_in_parent=(0.00114552 0.376431 -0.399321) location=(0 0 0)
          orientation=(0.2 0 0)
    Body gears: mass=0.5 mass_center=(0.02 0 0) inertia_xx=0.007439063 inertia_yy=0.001 inertia_zz=0.001
        meshes=geometry/gears.obj
      CustomJoint frame_gears: parent_body=frame location_in_parent=(-0.0266384 -0.291526 -0.20305) location=(0 0 0)
        Coordinate gear_rotation: motion_type=rotational default_value=0.06203475 range=(-3.14 3.14) clamped=true
        SpatialTransform: axes_held_at_zero=(rotation2 rotation3 translation1 translation2 translation3)
          TransformAxis rotation1: coordinates=gear_rotation axis=(1 0 0) LinearFunction(coefficients=1 0)
    Body pedal_l: mass=0.15 mass_center=(0 0 0) inertia_xx=0.0000675 inertia_yy=0.00001 inertia_zz=0.00001
        meshes=geometry/pedal_l.obj
      CustomJoint pedal_l_gears: parent_body=gears location_in_parent=(0.1187419 -0.113054 0.159427) location=(0 0 0)
        Coordinate pedal_rotation_l: motion_type=rotational default_value=0 range=(-3.14 3.14) clamped=true
        SpatialTransform: axes_held_at_zero=(rotation2 rotation3 translation1 translation2 translation3)
          TransformAxis rotation1: coordinates=pedal_rotation_l axis=(1 0 0) LinearFunction(coefficients=1 0)
    Body pedal_r: mass=0.15 mass_center=(0 0 0) inertia_xx=0.0000675 inertia_yy=0.00001 inertia_zz=0.00001
        meshes=geometry/pedal_r.obj
      CustomJoint pedal_r_gears: parent_body=gears location_in_parent=(-0.0810048 0.109176 -0.179171) location=(0 0 0)
        Coordinate pedal_rotation_r: motion_type=rotational default_value=0 range=(-3.14 3.14) clamped=true
        SpatialTransform: axes_held_at_zero=(rotation2 rotation3 translation1 translation2 translation3)
          TransformAxis rotation1: coordinates=pedal_rotation_r axis=(1 0 0) LinearFunction(coefficients=1 0)
    Body wheel_r: mass=1.5 mass_center=(0 0 0) inertia_xx=0.063948 inertia_yy=0.01 inertia_zz=0.01
        meshes=geometry/wheel_r.obj
      WeldJoint wheel_r_gears: parent_body=frame location_in_parent=(0.00640082 -0.245379 -0.685729) location=(0 0 0)
    Body wheel_f: mass=1.5 mass_center=(0 0 0) inertia_xx=0.063948 inertia_yy=0.01 inertia_zz=0.01
        meshes=geometry/wheel_f.obj
      WeldJoint wheel_f_gears: parent_body=frame location_in_parent=(0.00274065 -0.23821 0.505443) location=(0 0 0)
    Body pelvis: mass=10.75379 mass_center=(-0.0739512 0 0) inertia_xx=0.1027003 inertia_yy=0.08701554
        inertia_zz=0.05784385 meshes=(sacrum.vtp pelvis.vtp l_pelvis.vtp)
      WeldJoint pelvis_saddle: parent_body=saddle location_in_parent=(0 0.1722512 0.0434398)
          orientation_in_parent=(-0.18 4.68 0) location=(0 0 0)
    Body femur_r: mass=8.549266 mass_center=(0 -0.199543 0) inertia_xx=0.1695643 inertia_yy=0.0444489
        inertia_zz=0.1788087 meshes=femur_r.vtp
      CustomJoint hip_r: parent_body=pelvis location_in_parent=(-0.0707 -0.0661 0.0835) location=(0 0 0)
        Coordinate hip_flexion_r: motion_type=rotational default_value=0 range=(-2.094395 2.094395) clamped=false
        Coordinate hip_adduction_r: motion_type=rotational default_value=0 range=(-2.094395 2.094395) clamped=false
        Coordinate hip_rotation_r: motion_type=rotational default_value=0 range=(-2.094395 2.094395) clamped=false
        SpatialTransform: axes_held_at_zero=(translation1 translation2 translation3)
          TransformAxis rotation1: coordinates=hip_flexion_r axis=(0 0 1) LinearFunction(coefficients=1 0)
          TransformAxis rotation2: coordinates=hip_adduction_r axis=(1 0 0) LinearFunction(coefficients=1 0)
          TransformAxis rotation3: coordinates=hip_rotation_r axis=(0 1 0) LinearFunction(coefficients=1 0)
    Body tibia_r: mass=4.674042 mass_center=(0 -0.2098 0) inertia_xx=0.08023514 inertia_yy=0.00811903
        inertia_zz=0.08134951 meshes=(tibia_r.vtp fibula_r.vtp)
      CustomJoint knee_r: parent_body=femur_r location_in_parent=(0 0 0) location=(0 0 0)
        Coordinate knee_angle_r: motion_type=rotational default_value=-1.826984 range=(-2.094395 0.1745329)
            clamped=true
        SpatialTransform: axes_held_at_zero=(rotation2 rotation3 translation3)
          TransformAxis rotation1: coordinates=knee_angle_r axis=(0 0 1) LinearFunction(coefficients=1 0)
          TransformAxis translation1: coordinates=knee_angle_r axis=(1 0 0)
            MultiplierFunction: scale=1
              SimmSpline: x=(-2.0944 -1.74533 -1.39626 -1.0472 -0.698132 -0.349066 -0.174533 0.197344 0.337395 0.490178 1.52146 2.0944)
                  y=(-0.0037561 0.00210107 0.00482424 0.00481249 0.00248841 -0.00117378 -0.00363871 -0.00613534 -0.00637949 -0.00654265 -0.00637949 -0.00616234)
          TransformAxis translation2: coordinates=knee_angle_r axis=(0 1 0)
            MultiplierFunction: scale=1
              SimmSpline: x=(-2.0944 -1.22173 -0.523599 -0.349066 -0.174533 0.159149 2.0944)
                  y=(-0.496039 -0.479137 -0.468338 -0.466695 -0.465521 -0.463953 -0.464817)
    Body patella_r: mass=0.09191376 mass_center=(0 0 0) inertia_xx=0.00110296 inertia_yy=0.00110296
        inertia_zz=0.00110296 meshes=pat.vtp
      CustomJoint tib_pat_r: parent_body=tibia_r location_in_parent=(0 0 0) location=(0 0 0)
        Coordinate knee_angle_pat_r: motion_type=rotational default_value=-1.826984 range=(-2.094 10) clamped=false
        SpatialTransform: axes_held_at_zero=(rotation2 rotation3 translation3)
          TransformAxis rotation1: coordinates=knee_angle_pat_r axis=(0 0 1)
            SimmSpline: x=(-2.0944 -1.99997 -1.45752 -0.526391 0.0279253 0.174533)
                y=(0.308051 0.308051 0.306305 0.270177 -0.037001 -0.279951)
          TransformAxis translation1: coordinates=knee_angle_pat_r axis=(1 0 0)
            MultiplierFunction: scale=1
              SimmSpline: x=(-2.0944 -1.39626 -1.0472 -0.698132 -0.349066 -0.174533 0 0.00017453 0.00034907 0.0872665 2.0944)
                  y=(0.0194405 0.0364088 0.042814 0.0483203 0.0527029 0.0543884 0.0557369 0.0557369 0.0557369 0.0557369 0.0557369)
          TransformAxis translation2: coordinates=knee_angle_pat_r axis=(0 1 0)
            MultiplierFunction: scale=1
              SimmSpline: x=(-2.0944 -1.5708 -1.39626 -1.0472 -0.698132 -0.349066 -0.174533 0 0.00017453 0.00034907 0.0872665 2.0944)
                  y=(-0.0246096 -0.0226993 -0.0224746 -0.0229241 -0.0237107 -0.0246096 -0.0250591 -0.0255086 -0.0255086 -0.0255086 -0.0255086 -0.0255086)
    Body talus_r: mass=0.1260686 mass_center=(0 0 0) inertia_xx=0.00202166 inertia_yy=0.00202166 inertia_zz=0.00202166
        meshes=talus.vtp
      PinJoint ankle_r: parent_body=tibia_r location_in_parent=(0 -0.43 0) location=(0 0 0)
        Coordinate ankle_angle_r: motion_type=rotational default_value=0 range=(-1.570796 1.570796) clamped=false
    Body calcn_r: mass=1.072248 mass_center=(0.102693 0.0308079 0) inertia_xx=0.00090462 inertia_yy=0.00361848
        inertia_zz=0.00361848 meshes=foot.vtp
      WeldJoint subtalar_r: parent_body=talus_r location_in_parent=(-0.0620508 -0.0531864 0.0101307) location=(0 0 0)
    Body toes_r: mass=0.1861423 mass_center=(0.0359425 0.00616157 -0.0184847) inertia_xx=0 inertia_yy=0
        inertia_zz=0.00090462 meshes=bofoot.vtp
      WeldJoint mtp_r: parent_body=calcn_r location_in_parent=(0.18382 -0.00205386 0.00102692) location=(0 0 0)
    Body femur_l: mass=8.549266 mass_center=(0 -0.199543 0) inertia_xx=0.1695643 inertia_yy=0.0444489
        inertia_zz=0.1788087 meshes=femur_l.vtp
      CustomJoint hip_l: parent_body=pelvis location_in_parent=(-0.0707 -0.0661 -0.0835) location=(0 0 0)
        Coordinate hip_flexion_l: motion_type=rotational default_value=0 range=(-2.094395 2.094395) clamped=false
        Coordinate hip_adduction_l: motion_type=rotational default_value=0 range=(-2.094395 2.094395) clamped=false
        Coordinate hip_rotation_l: motion_type=rotational default_value=0 range=(-2.094395 2.094395) clamped=false
        SpatialTransform: axes_held_at_zero=(translation1 translation2 translation3)
          TransformAxis rotation1: coordinates=hip_flexion_l axis=(0 0 1) LinearFunction(coefficients=1 0)
          TransformAxis rotation2: coordinates=hip_adduction_l axis=(-1 0 0) LinearFunction(coefficients=1 0)
          TransformAxis rotation3: coordinates=hip_rotation_l axis=(0 -1 0) LinearFunction(coefficients=1 0)
    Body tibia_l: mass=4.674042 mass_center=(0 -0.2098 0) inertia_xx=0.08023514 inertia_yy=0.00811903
        inertia_zz=0.08134951 meshes=(tibia_l.vtp fibula_l.vtp)
      CustomJoint knee_l: parent_body=femur_l location_in_parent=(0 0 0) location=(0 0 0)
        Coordinate knee_angle_l: motion_type=rotational default_value=-0.8250258 range=(-2.094395 0.1745329)
            clamped=true
        SpatialTransform: axes_held_at_zero=(rotation2 rotation3 translation3)
          TransformAxis rotation1: coordinates=knee_angle_l axis=(0 0 1) LinearFunction(coefficients=1 0)
          TransformAxis translation1: coordinates=knee_angle_l axis=(1 0 0)
            MultiplierFunction: scale=1
              SimmSpline: x=(-2.0944 -1.74533 -1.39626 -1.0472 -0.698132 -0.349066 -0.174533 0.197344 0.337395 0.490178 1.52146 2.0944)
                  y=(-0.0037561 0.00210107 0.00482424 0.00481249 0.00248841 -0.00117378 -0.00363871 -0.00613534 -0.00637949 -0.00654265 -0.00637949 -0.00616234)
          TransformAxis translation2: coordinates=knee_angle_l axis=(0 1 0)
            MultiplierFunction: scale=1
              SimmSpline: x=(-2.0944 -1.22173 -0.523599 -0.349066 -0.174533 0.159149 2.0944)
                  y=(-0.496039 -0.479137 -0.468338 -0.466695 -0.465521 -0.463953 -0.464817)
    Body patella_l: mass=0.09191376 mass_center=(0 0 0) inertia_xx=0.00110296 inertia_yy=0.00110296
        inertia_zz=0.00110296 meshes=pat.vtp
      CustomJoint tib_pat_l: parent_body=tibia_l location_in_parent=(0 0 0) location=(0 0 0)
        Coordinate knee_angle_pat_l: motion_type=rotational default_value=-0.8250257 range=(-2.094 10) clamped=false
        SpatialTransform: axes_held_at_zero=(rotation2 rotation3 translation3)
          TransformAxis rotation1: coordinates=knee_angle_pat_l axis=(0 0 1)
            SimmSpline: x=(-2.0944 -1.99997 -1.45752 -0.526391 0.0279253 0.174533)
                y=(0.308051 0.308051 0.306305 0.270177 -0.037001 -0.279951)
          TransformAxis translation1: coordinates=knee_angle_pat_l axis=(1 0 0)
            MultiplierFunction: scale=1
              SimmSpline: x=(-2.0944 -1.39626 -1.0472 -0.698132 -0.349066 -0.174533 0 0.00017453 0.00034907 0.0872665 2.0944)
                  y=(0.0194405 0.0364088 0.042814 0.0483203 0.0527029 0.0543884 0.0557369 0.0557369 0.0557369 0.0557369 0.0557369)
          TransformAxis translation2: coordinates=knee_angle_pat_l axis=(0 1 0)
            MultiplierFunction: scale=1
              SimmSpline: x=(-2.0944 -1.5708 -1.39626 -1.0472 -0.698132 -0.349066 -0.174533 0 0.00017453 0.00034907 0.0872665 2.0944)
                  y=(-0.0246096 -0.0226993 -0.0224746 -0.0229241 -0.0237107 -0.0246096 -0.0250591 -0.0255086 -0.0255086 -0.0255086 -0.0255086 -0.0255086)
    Body talus_l: mass=0.1260686 mass_center=(0 0 0) inertia_xx=0.00202166 inertia_yy=0.00202166 inertia_zz=0.00202166
        meshes=talus.vtp
      PinJoint ankle_l: parent_body=tibia_l location_in_parent=(0 -0.43 0) location=(0 0 0)
        Coordinate ankle_angle_l: motion_type=rotational default_value=0 range=(-1.047198 1.047198) clamped=false
    Body calcn_l: mass=1.072248 mass_center=(0.102693 0.0308079 0) inertia_xx=0.00090462 inertia_yy=0.00361848
        inertia_zz=0.00361848 meshes=l_foot.vtp
      WeldJoint subtalar_l: parent_body=talus_l location_in_parent=(-0.0620508 -0.0531864 -0.0101307) location=(0 0 0)
    Body toes_l: mass=0.1861423 mass_center=(0.0359425 0.00616157 0.0184847) inertia_xx=0 inertia_yy=0
        inertia_zz=0.00090462 meshes=l_bofoot.vtp
      WeldJoint mtp_l: parent_body=calcn_l location_in_parent=(0.18382 -0.00205386 -0.00102692) location=(0 0 0)
  ConstraintSet:
    CoordinateCouplerConstraint pat_angle_r: independent_coordinate_names=knee_angle_r
        dependent_coordinate_name=knee_angle_pat_r scale_factor=1
        coupled_coordinates_function=LinearFunction(coefficients=1 0)
    CoordinateCouplerConstraint pat_angle_l: independent_coordinate_names=knee_angle_l
        dependent_coordinate_name=knee_angle_pat_l scale_factor=1
        coupled_coordinates_function=LinearFunction(coefficients=1 0)
    WeldConstraint toes_pedal_r: body_1=toes_r body_2=pedal_r location_body_1=(0 0 0) orientation_body_1=(0 0 0)
        location_body_2=(0 0 0) orientation_body_2=(0 1.57 0)
    WeldConstraint toes_pedal_l: body_1=toes_l body_2=pedal_l location_body_1=(0 0 0) orientation_body_1=(0 0 0)
        location_body_2=(0 0 0) orientation_body_2=(0 1.57 0)
  ForceSet:
    Millard2012EquilibriumMuscle [values shared by the 18 below unless stated]: min_control=0 max_control=1
        optimal_force=1 max_contraction_velocity=10 activation_time_constant=0.01 deactivation_time_constant=0.04
        FmaxTendonStrain=0.033 FmaxMuscleStrain=0.6 KshapeActive=0.5 KshapePassive=4 Af=0.3 Flen=1.8
    Millard2012EquilibriumMuscle hamstrings_r: max_isometric_force=2700 optimal_fiber_length=0.1236311
        tendon_slack_length=0.3697589 pennation_angle_at_optimal=0 [radians]
      PathPoint bifemlh_r-P1: pelvis (-0.129056 -0.105091 0.0711468)
      PathPoint bifemlh_r-P2: tibia_r (-0.0297545 -0.0355868 0.0290922)
      PathPoint bifemlh_r-P3: tibia_r (-0.0231314 -0.0556538 0.0339063)
    Millard2012EquilibriumMuscle bifemsh_r: max_isometric_force=804 optimal_fiber_length=0.1914449
        tendon_slack_length=0.09848899 pennation_angle_at_optimal=0.4014257
      PathPoint P1: femur_r (0.0057362 -0.242182 0.0268454)
      PathPoint P2: tibia_r (-0.0297545 -0.0355868 0.0290922)
      PathPoint P3: tibia_r (-0.0231314 -0.0556538 0.0339063)
    Millard2012EquilibriumMuscle glut_max_r: max_isometric_force=1944 optimal_fiber_length=0.1708506
        tendon_slack_length=0.07981739 pennation_angle_at_optimal=0
      PathPoint P1: pelvis (-0.134937 0.00891385 0.0473356)
      PathPoint P2: pelvis (-0.137704 -0.0623969 0.0832984)
      PathPoint P3: femur_r (-0.0516258 -0.0669988 0.0289104)
      PathPoint P4: femur_r (-0.0178969 -0.11656 0.0480694)
    Millard2012EquilibriumMuscle iliopsoas_r: max_isometric_force=2342 optimal_fiber_length=0.1051725
        tendon_slack_length=0.168276 pennation_angle_at_optimal=0.1396263
      PathPoint psoas_r-P1: pelvis (-0.0662903 0.0908802 0.0296104)
      PathPoint psoas_r-P2: pelvis (-0.024385 -0.0584011 0.0777656)
      ConditionalPathPoint psoas_r-P3: pelvis (-0.0295079 -0.0824787 0.0836057) range=(-1.5708 0.785398)
          coordinate=hip_flexion_r
      PathPoint psoas_r-P4: femur_r (0.00183558 -0.0581651 0.00435951)
      PathPoint psoas_r-P5: femur_r (-0.0215681 -0.0684902 0.0119313)
    Millard2012EquilibriumMuscle rect_fem_r: max_isometric_force=1169 optimal_fiber_length=0.1304624
        tendon_slack_length=0.3547661 pennation_angle_at_optimal=0.08726646
      PathPoint P1: pelvis (-0.0302251 -0.0318644 0.0991793)
      ConditionalPathPoint P2: femur_r (0.0383178 -0.462338 0.00217976) range=(-2.61799 -1.45997)
          coordinate=knee_angle_r
      MovingPathPoint P3: tibia_r (0.0610488 0.0207432 0.00138393) x_coordinate=knee_angle_r y_coordinate=knee_angle_r
          z_coordinate=knee_angle_r
        x_location: MultiplierFunction: scale=0.988523
          SimmSpline: x=(-2.0944 -1.99997 -1.5708 -1.45752 -1.39626 -1.0472 -0.698132 -0.526391 -0.349066 -0.174533 0 0.00017453 0.00034907 0.0279253 0.0872665 0.174533 2.0944)
              y=(0.0155805 0.0179938 0.0275081 0.0296564 0.0307615 0.0365695 0.0422074 0.0450902 0.048391 0.0534299 0.0617576 0.0617669 0.0617762 0.0633083 0.066994 0.0733035 0.0573481)
        y_location: MultiplierFunction: scale=0.988523
          SimmSpline: x=(-2.0944 -1.99997 -1.5708 -1.45752 -1.39626 -1.0472 -0.698132 -0.526391 -0.349066 -0.174533 0 0.00017453 0.00034907 0.0279253 0.0872665 0.174533 2.0944)
              y=(0.0234116 0.0237613 0.0251141 0.0252795 0.0253146 0.0249184 0.0242373 0.0238447 0.0234197 0.0227644 0.020984 0.0209814 0.0209788 0.0205225 0.0191754 0.0159554 -0.0673774)
        z_location: MultiplierFunction: scale=0.988523
          SimmSpline: x=(-2.0944 0.1745) y=(0.0014 0.0014)
    Millard2012EquilibriumMuscle vasti_r: max_isometric_force=5000 optimal_fiber_length=0.1246787
        tendon_slack_length=0.1351657 pennation_angle_at_optimal=0.05235988
      PathPoint vas_int_r-P1: femur_r (0.03327 -0.220729 0.0355644)
      PathPoint vas_int_r-P2: femur_r (0.0384325 -0.239085 0.0326963)
      ConditionalPathPoint vas_int_r-P3: femur_r (0.0393503 -0.462338 0.00630982) range=(-2.61799 -1.42)
          coordinate=knee_angle_r
      MovingPathPoint vas_int_r-P4: tibia_r (0.0548266 0.025002 0.00177934) x_coordinate=knee_angle_r
          y_coordinate=knee_angle_r z_coordinate=knee_angle_r
        x_location: MultiplierFunction: scale=0.988523
          SimmSpline: x=(-2.0944 -1.99997 -1.5708 -1.45752 -1.39626 -1.0472 -0.698132 -0.526391 -0.349066 -0.174533 0 0.00017453 0.00034907 0.0279253 0.0872665 0.174533 2.0944)
              y=(0.0082733 0.0106866 0.0202042 0.022353 0.0234583 0.0292715 0.0349465 0.037871 0.0412569 0.0465287 0.0554632 0.0554735 0.0554837 0.0571717 0.061272 0.0684368 0.0648818)
        y_location: MultiplierFunction: scale=0.988523
          SimmSpline: x=(-2.0944 -1.99997 -1.5708 -1.45752 -1.39626 -1.0472 -0.698132 -0.526391 -0.349066 -0.174533 0 0.00017453 0.00034907 0.0279253 0.0872665 0.174533 2.0944)
              y=(0.025599 0.0259487 0.0273124 0.0274796 0.0275151 0.0271363 0.0265737 0.0263073 0.0261187 0.0260129 0.0252923 0.0252911 0.0252898 0.0250526 0.0242191 0.0218288 -0.0685706)
        z_location: MultiplierFunction: scale=0.988523
          SimmSpline: x=(-2.0944 2.0944) y=(0.0018 0.0018)
    Millard2012EquilibriumMuscle gastroc_r: max_isometric_force=2500 optimal_fiber_length=0.09012875
        tendon_slack_length=0.360515 pennation_angle_at_optimal=0.296706
      PathPoint med_gas_r-P1: femur_r (-0.0217976 -0.450751 -0.0269601)
      ConditionalPathPoint med_gas_r-P2: femur_r (-0.0344172 -0.46142 -0.0295988) range=(-0.785398 0.174533)
          coordinate=knee_angle_r
      PathPoint med_gas_r-P3: calcn_r (0 0.0318395 -0.00544352)
    Millard2012EquilibriumMuscle soleus_r: max_isometric_force=5137 optimal_fiber_length=0.05028884
        tendon_slack_length=0.2514442 pennation_angle_at_optimal=0.4363323
      PathPoint P1: tibia_r (-0.00237246 -0.151541 0.00701851)
      PathPoint P2: calcn_r (0 0.0318395 -0.00544352)
    Millard2012EquilibriumMuscle tib_ant_r: max_isometric_force=3000 optimal_fiber_length=0.09791257
        tendon_slack_length=0.2228011 pennation_angle_at_optimal=0.08726646
      PathPoint P1: tibia_r (0.0176946 -0.160536 0.011368)
      PathPoint P2: tibia_r (0.0325224 -0.390565 -0.0174969)
      PathPoint P3: calcn_r (0.119758 0.018282 -0.0313259)
    Millard2012EquilibriumMuscle hamstrings_l: max_isometric_force=2700 optimal_fiber_length=0.1236311
        tendon_slack_length=0.3697589 pennation_angle_at_optimal=0
      PathPoint bifemlh_l-P1: pelvis (-0.129056 -0.105091 -0.0711468)
      PathPoint bifemlh_l-P2: tibia_l (-0.0297545 -0.0355868 -0.0290922)
      PathPoint bifemlh_l-P3: tibia_l (-0.0231314 -0.0556538 -0.0339063)
    Millard2012EquilibriumMuscle bifemsh_l: max_isometric_force=804 optimal_fiber_length=0.1914449
        tendon_slack_length=0.09848899 pennation_angle_at_optimal=0.4014257
      PathPoint P1: femur_l (0.0057362 -0.242182 -0.0268454)
      PathPoint P2: tibia_l (-0.0297545 -0.0355868 -0.0290922)
      PathPoint P3: tibia_l (-0.0231314 -0.0556538 -0.0339063)
    Millard2012EquilibriumMuscle glut_max_l: max_isometric_force=1944 optimal_fiber_length=0.1708506
        tendon_slack_length=0.07981739 pennation_angle_at_optimal=0
      PathPoint P1: pelvis (-0.134937 0.00891385 -0.0473356)
      PathPoint P2: pelvis (-0.137704 -0.0623969 -0.0832984)
      PathPoint P3: femur_l (-0.0516258 -0.0669988 -0.0289104)
      PathPoint P4: femur_l (-0.0178969 -0.11656 -0.0480694)
    Millard2012EquilibriumMuscle iliopsoas_l: max_isometric_force=2342 optimal_fiber_length=0.1051725
        tendon_slack_length=0.168276 pennation_angle_at_optimal=0.1396263
      PathPoint psoas_l-P1: pelvis (-0.0662903 0.0908802 -0.0296104)
      PathPoint psoas_l-P2: pelvis (-0.024385 -0.0584011 -0.0777656)
      ConditionalPathPoint psoas_l-P3: pelvis (-0.0295079 -0.0824787 -0.0836057) range=(-1.5708 0.785398)
          coordinate=hip_flexion_l
      PathPoint psoas_l-P4: femur_l (0.00183558 -0.0581651 -0.00435951)
      PathPoint psoas_l-P5: femur_l (-0.0215681 -0.0684902 -0.0119313)
    Millard2012EquilibriumMuscle rect_fem_l: max_isometric_force=1169 optimal_fiber_length=0.1304624
        tendon_slack_length=0.3547661 pennation_angle_at_optimal=0.08726646
      PathPoint P1: pelvis (-0.0302251 -0.0318644 -0.0991793)
      ConditionalPathPoint P2: femur_l (0.0383178 -0.462338 -0.00217976) range=(-2.61799 -1.45997)
          coordinate=knee_angle_l
      MovingPathPoint P3: tibia_l (0.0610488 0.0207432 -0.00138393) x_coordinate=knee_angle_l y_coordinate=knee_angle_l
          z_coordinate=knee_angle_l
        x_location: MultiplierFunction: scale=0.988523
          SimmSpline: x=(-2.0944 -1.99997 -1.5708 -1.45752 -1.39626 -1.0472 -0.698132 -0.526391 -0.349066 -0.174533 0 0.00017453 0.00034907 0.0279253 0.0872665 0.174533 2.0944)
              y=(0.0155805 0.0179938 0.0275081 0.0296564 0.0307615 0.0365695 0.0422074 0.0450902 0.048391 0.0534299 0.0617576 0.0617669 0.0617762 0.0633083 0.066994 0.0733035 0.0573481)
        y_location: MultiplierFunction: scale=0.988523
          SimmSpline: x=(-2.0944 -1.99997 -1.5708 -1.45752 -1.39626 -1.0472 -0.698132 -0.526391 -0.349066 -0.174533 0 0.00017453 0.00034907 0.0279253 0.0872665 0.174533 2.0944)
              y=(0.0234116 0.0237613 0.0251141 0.0252795 0.0253146 0.0249184 0.0242373 0.0238447 0.0234197 0.0227644 0.020984 0.0209814 0.0209788 0.0205225 0.0191754 0.0159554 -0.0673774)
        z_location: MultiplierFunction: scale=0.988523
          SimmSpline: x=(-2.0944 0.1745) y=(-0.0014 -0.0014)
    Millard2012EquilibriumMuscle vasti_l: max_isometric_force=5000 optimal_fiber_length=0.1246787
        tendon_slack_length=0.1351657 pennation_angle_at_optimal=0.05235988
      PathPoint vas_int_l-P1: femur_l (0.03327 -0.220729 -0.0355644)
      PathPoint vas_int_l-P2: femur_l (0.0384325 -0.239085 -0.0326963)
      ConditionalPathPoint vas_int_l-P3: femur_l (0.0393503 -0.462338 -0.00630982) range=(-2.61799 -1.42)
          coordinate=knee_angle_l
      MovingPathPoint vas_int_l-P4: tibia_l (0.0548266 0.025002 -0.00177934) x_coordinate=knee_angle_l
          y_coordinate=knee_angle_l z_coordinate=knee_angle_l
        x_location: MultiplierFunction: scale=0.988523
          SimmSpline: x=(-2.0944 -1.99997 -1.5708 -1.45752 -1.39626 -1.0472 -0.698132 -0.526391 -0.349066 -0.174533 0 0.00017453 0.00034907 0.0279253 0.0872665 0.174533 2.0944)
              y=(0.0082733 0.0106866 0.0202042 0.022353 0.0234583 0.0292715 0.0349465 0.037871 0.0412569 0.0465287 0.0554632 0.0554735 0.0554837 0.0571717 0.061272 0.0684368 0.0648818)
        y_location: MultiplierFunction: scale=0.988523
          SimmSpline: x=(-2.0944 -1.99997 -1.5708 -1.45752 -1.39626 -1.0472 -0.698132 -0.526391 -0.349066 -0.174533 0 0.00017453 0.00034907 0.0279253 0.0872665 0.174533 2.0944)
              y=(0.025599 0.0259487 0.0273124 0.0274796 0.0275151 0.0271363 0.0265737 0.0263073 0.0261187 0.0260129 0.0252923 0.0252911 0.0252898 0.0250526 0.0242191 0.0218288 -0.0685706)
        z_location: MultiplierFunction: scale=0.988523
          SimmSpline: x=(-2.0944 2.0944) y=(-0.0018 -0.0018)
    Millard2012EquilibriumMuscle gastroc_l: max_isometric_force=2500 optimal_fiber_length=0.09012875
        tendon_slack_length=0.360515 pennation_angle_at_optimal=0.296706
      PathPoint med_gas_l-P1: femur_l (-0.0217976 -0.450751 0.0269601)
      ConditionalPathPoint med_gas_l-P2: femur_l (-0.0344172 -0.46142 0.0295988) range=(-0.785398 0.174533)
          coordinate=knee_angle_l
      PathPoint med_gas_l-P3: calcn_l (0 0.0318395 0.00544352)
    Millard2012EquilibriumMuscle soleus_l: max_isometric_force=5137 optimal_fiber_length=0.05028884
        tendon_slack_length=0.2514442 pennation_angle_at_optimal=0.4363323
      PathPoint P1: tibia_l (-0.00237246 -0.151541 -0.00701851)
      PathPoint P2: calcn_l (0 0.0318395 0.00544352)
    Millard2012EquilibriumMuscle tib_ant_l: max_isometric_force=3000 optimal_fiber_length=0.09791257
        tendon_slack_length=0.2228011 pennation_angle_at_optimal=0.08726646
      PathPoint P1: tibia_l (0.0176946 -0.160536 -0.011368)
      PathPoint P2: tibia_l (0.0325224 -0.390565 0.0174969)
      PathPoint P3: calcn_l (0.119758 0.018282 0.0313259)
  MarkerSet:
    Marker saddle_frame: frame (0.00114552 0.376431 -0.379321) fixed=true
    Marker gears_frame: frame (-0.0366384 -0.291526 -0.20305) fixed=true
    Marker pedal_l_gears: gears (0.118742 -0.113054 0.159427) fixed=true
    Marker pedal_r_gears: gears (-0.0810048 0.109176 -0.179171) fixed=true
    Marker wheel_r_gears: frame (0.00640082 -0.245379 -0.685729) fixed=true
    Marker wheel_f_gears: frame (0.00274065 -0.23821 0.505443) fixed=true
    Marker pelvis_saddle: saddle (0 0.0972512 0.0434398) fixed=true
  ProbeSet:
    Umberger2010MuscleMetabolicsProbe metabolics: probe_operation=value initial_conditions_for_integration=0
        activation_maintenance_rate_on=true shortening_rate_on=true basal_rate_on=false mechanical_work_rate_on=true
        aerobic_factor=1.5 report_total_metabolics_only=false
      # Aerobic scale factor (S=1.0 for primarily anaerobic conditions and S=1.5 for primarily aerobic conditions. See Umberger et al., (2003).
      Umberger2010MuscleMetabolicsProbe_MetabolicMuscleParameterSet:
        Umberger2010MuscleMetabolicsProbe_MetabolicMuscleParameter hamstrings_r: ratio_slow_twitch_fibers=0.49
            use_provided_muscle_mass=false
        Umberger2010MuscleMetabolicsProbe_MetabolicMuscleParameter bifemsh_r: ratio_slow_twitch_fibers=0.53
            use_provided_muscle_mass=false
        Umberger2010MuscleMetabolicsProbe_MetabolicMuscleParameter glut_max_r: ratio_slow_twitch_fibers=0.55
            use_provided_muscle_mass=false
        Umberger2010MuscleMetabolicsProbe_MetabolicMuscleParameter iliopsoas_r: ratio_slow_twitch_fibers=0.5
            use_provided_muscle_mass=false
        Umberger2010MuscleMetabolicsProbe_MetabolicMuscleParameter rect_fem_r: ratio_slow_twitch_fibers=0.39
            use_provided_muscle_mass=false
        Umberger2010MuscleMetabolicsProbe_MetabolicMuscleParameter vasti_r: ratio_slow_twitch_fibers=0.5
            use_provided_muscle_mass=false
        Umberger2010MuscleMetabolicsProbe_MetabolicMuscleParameter gastroc_r: ratio_slow_twitch_fibers=0.54
            use_provided_muscle_mass=false
        Umberger2010MuscleMetabolicsProbe_MetabolicMuscleParameter soleus_r: ratio_slow_twitch_fibers=0.8
            use_provided_muscle_mass=false
        Umberger2010MuscleMetabolicsProbe_MetabolicMuscleParameter tib_ant_r: ratio_slow_twitch_fibers=0.7
            use_provided_muscle_mass=false
        Umberger2010MuscleMetabolicsProbe_MetabolicMuscleParameter hamstrings_l: ratio_slow_twitch_fibers=0.49
            use_provided_muscle_mass=false
        Umberger2010MuscleMetabolicsProbe_MetabolicMuscleParameter bifemsh_l: ratio_slow_twitch_fibers=0.53
            use_provided_muscle_mass=false
        Umberger2010MuscleMetabolicsProbe_MetabolicMuscleParameter glut_max_l: ratio_slow_twitch_fibers=0.55
            use_provided_muscle_mass=false
        Umberger2010MuscleMetabolicsProbe_MetabolicMuscleParameter iliopsoas_l: ratio_slow_twitch_fibers=0.5
            use_provided_muscle_mass=false
        Umberger2010MuscleMetabolicsProbe_MetabolicMuscleParameter rect_fem_l: ratio_slow_twitch_fibers=0.39
            use_provided_muscle_mass=false
        Umberger2010MuscleMetabolicsProbe_MetabolicMuscleParameter vasti_l: ratio_slow_twitch_fibers=0.5
            use_provided_muscle_mass=false
        Umberger2010MuscleMetabolicsProbe_MetabolicMuscleParameter gastroc_l: ratio_slow_twitch_fibers=0.54
            use_provided_muscle_mass=false
        Umberger2010MuscleMetabolicsProbe_MetabolicMuscleParameter soleus_l: ratio_slow_twitch_fibers=0.8
            use_provided_muscle_mass=false
        Umberger2010MuscleMetabolicsProbe_MetabolicMuscleParameter tib_ant_l: ratio_slow_twitch_fibers=0.7
            use_provided_muscle_mass=false
