# OpenSim document version 30000
Model Scaled_Drop_Landing:
  length_units: meters
  force_units: N
  gravity: 0 -9.80665 0
  credits:
    DeMers, M.S., Steele, K.M., Hamner S.R., Delp S.L., Loan J.P., Hoy M.G., Zajac F.E., Topp E.L., Rosen J.M., Thelen D.G., Anderson F.C., Seth A.
  publications:
    Notes: 3D, 23 DOF gait model created by D.G. Thelen, Univ. of Wisconsin-Madison, and Matt DeMers, Katherine Steel, Samuel Hamner, Ajay Seth, Frank C. Anderson, and Scott L. Delp, Stanford University. Lower extremity joint defintions based on Delp et al. (1990). Low back joint and anthropometry based on Anderson and Pandy (1999, 2001). Planar knee model of Yamaguchi and Zajac (1989). Hamner added arms adapted from Holzbaur et al., 2005. DeMers and Steele redefined the planar patella kinematics as a planar joint between the patella and femur instead of constraints between the patella and tibia. Quadriceps wrap through the patell to the tibial tuberocity in place of a separate patellar ligament. Delp, S.L., Loan, J.P., Hoy, M.G., Zajac, F.E., Topp E.L., Rosen, J.M.: An interactive graphics-based model of the lower extremity to study orthopaedic surgical procedures, IEEE Transactions on Biomedical Engineering, vol. 37, pp. 757-767, 1990. Yamaguchi G.T., Zajac F.E.: A planar model of the knee joint to characterize the knee extensor mechanism." J . Biomecl7. vol. 21. pp. 1-10. 1989. Anderson F.C., Pandy M.G.: A dynamic optimization solution for vertical jumping in three dimensions. Computer Methods in Biomechanics and Biomedical Engineering 2:201-231, 1999. Anderson F.C., Pandy M.G.: Dynamic optimization of human walking. Journal of Biomechanical Engineering 123:381-390, 2001. Holzbaur, KR, WM Murray and SL Delp, 2005. A model of the upper extremity for simulating musculoskeletal surgery and analyzing neuromuscular control. Ann Biomed Eng 33(6): 829-840.
  defaults: Thelen2003Muscle default: min_control=0.01 max_control=1 optimal_force=1 max_isometric_force=546
      optimal_fiber_length=0.0535 tendon_slack_length=0.078 pennation_angle_at_optimal=0 [radians]
      max_contraction_velocity=10 activation_time_constant=0.01 deactivation_time_constant=0.04 FmaxTendonStrain=0.033
      FmaxMuscleStrain=0.6 KshapeActive=0.5 KshapePassive=4 Af=0.3 Flen=1.8
  BodySet:
    Body ground: mass=0 mass_center=(0 0 0) inertia_xx=0 inertia_yy=0 inertia_zz=0
    Body platform_body: mass=0.8962268 mass_center=(0 0 0) inertia_xx=0.8962268 inertia_yy=0.8962268
        inertia_zz=0.8962268 meshes=checkered_floor.vtp
      CustomJoint ground_platform: parent_body=ground location_in_parent=(0 0 0) location=(0 0 0)
        Coordinate platform_rx: motion_type=rotational default_value=6.235611e-11 range=(-3.1416 3.1416) clamped=false
            locked=true
        Coordinate platform_ry: motion_type=rotational default_value=0 range=(-3.1416 3.1416) clamped=true locked=true
        Coordinate platform_rz: motion_type=rotational default_value=0 range=(-3.1416 3.1416) clamped=true locked=true
        Coordinate platform_ty: motion_type=translational default_value=1.061683e-9 range=(-5 1) clamped=false
            locked=true
        SpatialTransform: axes_held_at_zero=(translation1 translation3)
          TransformAxis rotation1: coordinates=platform_rx axis=(1 0 0) LinearFunction(coefficients=1 0)
          TransformAxis rotation2: coordinates=platform_ry axis=(0 1 0) LinearFunction(coefficients=1 0)
          TransformAxis rotation3: coordinates=platform_rz axis=(0 0 1) LinearFunction(coefficients=1 0)
          TransformAxis translation2: coordinates=platform_ty axis=(0 1 0) LinearFunction(coefficients=1 0)
    Body pelvis: mass=10.55486 mass_center=(-0.0699828 0 0) inertia_xx=0.0902723 inertia_yy=0.07648557
        inertia_zz=0.05084403 meshes=(sacrum.vtp pelvis.vtp l_pelvis.vtp)
      CustomJoint ground_pelvis: parent_body=ground location_in_parent=(0 0 0) location=(0 0 0)
        Coordinate pelvis_tilt: motion_type=rotational default_value=-4.518491e-10 range=(-1.570796 1.570796)
            clamped=true
        Coordinate pelvis_list: motion_type=rotational default_value=-4.237156e-7 range=(-1.570796 1.570796)
            clamped=true
        Coordinate pelvis_rotation: motion_type=rotational default_value=9.284049e-8 range=(-1.570796 1.570796)
            clamped=true
        Coordinate pelvis_tx: motion_type=translational default_value=0.05000237 range=(-5 5) clamped=true
        Coordinate pelvis_ty: motion_type=translational default_value=1.05 range=(-1 2) clamped=true
        Coordinate pelvis_tz: motion_type=translational default_value=-0.1 range=(-3 3) clamped=true
        SpatialTransform:
          TransformAxis rotation1: coordinates=pelvis_tilt axis=(0 0 1) LinearFunction(coefficients=1 0)
          TransformAxis rotation2: coordinates=pelvis_list axis=(1 0 0) LinearFunction(coefficients=1 0)
          TransformAxis rotation3: coordinates=pelvis_rotation axis=(0 1 0) LinearFunction(coefficients=1 0)
          TransformAxis translation1: coordinates=pelvis_tx axis=(1 0 0) LinearFunction(coefficients=1 0)
          TransformAxis translation2: coordinates=pelvis_ty axis=(0 1 0) LinearFunction(coefficients=1 0)
          TransformAxis translation3: coordinates=pelvis_tz axis=(0 0 1) LinearFunction(coefficients=1 0)
    Body femur_r: mass=8.336164 mass_center=(0 -0.185678 0) inertia_xx=0.1431603 inertia_yy=0.03752745
        inertia_zz=0.1509651 meshes=femur_r.vtp
      CustomJoint hip_r: parent_body=pelvis location_in_parent=(-0.06998277 -0.06542944 0.08265292) location=(0 0 0)
        Coordinate hip_flexion_r: motion_type=rotational default_value=-8.611924e-10 range=(-2.094395 2.094395)
            clamped=true
        Coordinate hip_adduction_r: motion_type=rotational default_value=-2.64028e-10 range=(-2.094395 2.094395)
            clamped=true
        Coordinate hip_rotation_r: motion_type=rotational default_value=-7.385835e-11 range=(-2.094395 2.094395)
            clamped=true
        SpatialTransform: axes_held_at_zero=(translation1 translation2 translation3)
          TransformAxis rotation1: coordinates=hip_flexion_r axis=(0 0 1) LinearFunction(coefficients=1 0)
          TransformAxis rotation2: coordinates=hip_adduction_r axis=(1 0 0) LinearFunction(coefficients=1 0)
          TransformAxis rotation3: coordinates=hip_rotation_r axis=(0 1 0) LinearFunction(coefficients=1 0)
    Body tibia_r: mass=3.322761 mass_center=(0 -0.201765 0) inertia_xx=0.05275336 inertia_yy=0.005338138
        inertia_zz=0.05348605 meshes=(tibia_r.vtp fibula_r.vtp)
      CustomJoint knee_r: parent_body=femur_r location_in_parent=(0 -0.4412588 0) location=(0 -0.02701723 0)
        Coordinate knee_angle_r: motion_type=rotational default_value=-1.022824e-7 range=(-2.094395 0.1745329)
            clamped=true
        SpatialTransform: axes_held_at_zero=(rotation2 rotation3 translation3)
          TransformAxis rotation1: coordinates=knee_angle_r axis=(0 0 1) LinearFunction(coefficients=1 0)
          TransformAxis translation1: coordinates=knee_angle_r axis=(1 0 0)
            MultiplierFunction: scale=1.092225
              SimmSpline: x=(-2.0944 -1.74533 -1.39626 -1.0472 -0.698132 -0.349066 -0.174533 0 0.197344 0.337395 0.490178 1.52146 2.0944)
                  y=(-0.0248506 -0.0228302 -0.0205102 -0.0175507 -0.0139497 -0.00955051 -0.00744121 -0.00525 -0.00032536 0.00284075 0.00619557 0.0195346 0.0164006)
          TransformAxis translation2: coordinates=knee_angle_r axis=(0 1 0)
            MultiplierFunction: scale=1.092225
              SimmSpline: x=(-2.0944 -1.22173 -0.523599 -0.349066 -0.174533 0 0.159149 2.0944)
                  y=(-0.00609989 -0.0127505 -0.0166506 -0.0170923 -0.0172202 -0.017 -0.0159841 0.0205001)
    Body patella_r: mass=0.08962268 mass_center=(0 0 0) inertia_xx=0.001069158 inertia_yy=0.001069158
        inertia_zz=0.001069158 meshes=pat.vtp
      CustomJoint pat_fem_r: parent_body=femur_r location_in_parent=(0 -0.4412588 0) location=(0 0 0)
        Coordinate patella_r_constrained_knee_angle: motion_type=rotational default_value=-1.022824e-7
            range=(-3.14 3.14) clamped=true is_free_to_satisfy_constraints=true
        SpatialTransform: axes_held_at_zero=(rotation2 rotation3)
          TransformAxis rotation1: coordinates=patella_r_constrained_knee_angle axis=(0 0 1)
            SimmSpline: x=(-2.0944 -1.45752 -0.526391 0 0.0523599 0.174533)
                y=(-1.68636 -1.09112 -0.256161 -0.0012 -0.0187016 -0.1054)
          TransformAxis translation1: coordinates=patella_r_constrained_knee_angle axis=(1 0 0)
            MultiplierFunction: scale=1.092225
              SimmSpline: x=(-2.0944 -1.91986 -1.5708 -1.39626 -1.0472 -0.698132 -0.349066 -0.174533 0 0.0872665 0.174533 2.0944)
                  y=(-0.03082 -0.02767 -0.01694 -0.00996 0.00548 0.0215 0.03599 0.04069 0.0451 0.04648 0.04761 0.04648)
          TransformAxis translation2: coordinates=patella_r_constrained_knee_angle axis=(0 1 0)
            MultiplierFunction: scale=1.092225
              SimmSpline: x=(-2.0944 -1.91986 -1.5708 -1.39626 -1.0472 -0.698132 -0.349066 -0.174533 0 0.0872665 0.174533 2.0944)
                  y=(-0.02263 -0.02892 -0.03914 -0.04244 -0.04469 -0.04063 -0.02973 -0.02297 -0.01452 -0.00979 -0.00496 -0.00979)
          TransformAxis translation3: axis=(0 0 1) MultiplierFunction(scale=1.092225, Constant(value=0.0024))
    Body talus_r: mass=0.08962268 mass_center=(0 0 0) inertia_xx=0.0009816825 inertia_yy=0.0009816825
        inertia_zz=0.0009816825 meshes=talus_rv.vtp
      CustomJoint ankle_r: parent_body=tibia_r location_in_parent=(0 -0.4646964 0) location=(0 0 0)
        Coordinate ankle_angle_r: motion_type=rotational default_value=-2.842402e-9 range=(-1.570796 1.570796)
            clamped=true
        SpatialTransform: axes_held_at_zero=(rotation2 rotation3 translation1 translation2 translation3)
          TransformAxis rotation1: coordinates=ankle_angle_r axis=(-0.1050135 -0.1740224 0.9791263)
              LinearFunction(coefficients=1 0)
    Body calcn_r: mass=1.120283 mass_center=(0.104659 0.0313977 0) inertia_xx=0.001374356 inertia_yy=0.003828562
        inertia_zz=0.004024898 meshes=foot.vtp
      CustomJoint subtalar_r: parent_body=talus_r location_in_parent=(-0.05104219 -0.04390445 0.008288993)
          location=(0 0 0)
        Coordinate subtalar_angle_r: motion_type=rotational default_value=-4.877763e-12 range=(-1.570796 1.570796)
            clamped=true
        SpatialTransform: axes_held_at_zero=(rotation2 rotation3 translation1 translation2 translation3)
          TransformAxis rotation1: coordinates=subtalar_angle_r axis=(0.7871796 0.6047475 -0.1209495)
              LinearFunction(coefficients=1 0)
    Body toes_r: mass=0.1941227 mass_center=(0.036212 0.00627954 -0.0183153) inertia_xx=9.816825e-5
        inertia_yy=0.0001963365 inertia_zz=0.0009816825 meshes=bofoot.vtp
      CustomJoint mtp_r: parent_body=calcn_r location_in_parent=(0.1871303 -0.00209318 0.001130317) location=(0 0 0)
        Coordinate mtp_angle_r: motion_type=rotational default_value=2.328083e-7 range=(-1.570796 1.570796)
            clamped=true locked=true
        SpatialTransform: axes_held_at_zero=(rotation2 rotation3 translation1 translation2 translation3)
          TransformAxis rotation1: coordinates=mtp_angle_r axis=(-0.5809544 0 0.8139361)
              LinearFunction(coefficients=1 0)
    Body femur_l: mass=8.336164 mass_center=(0 -0.186489 0) inertia_xx=0.1444137 inertia_yy=0.03785602
        inertia_zz=0.1522869 meshes=l_femur.vtp
      CustomJoint hip_l: parent_body=pelvis location_in_parent=(-0.06998277 -0.06542944 -0.08265292) location=(0 0 0)
        Coordinate hip_flexion_l: motion_type=rotational default_value=1.618921e-11 range=(-2.094395 2.094395)
            clamped=true
        Coordinate hip_adduction_l: motion_type=rotational default_value=-2.070196e-12 range=(-2.094395 2.094395)
            clamped=true
        Coordinate hip_rotation_l: motion_type=rotational default_value=-2.453407e-11 range=(-2.094395 2.094395)
            clamped=true
        SpatialTransform: axes_held_at_zero=(translation1 translation2 translation3)
          TransformAxis rotation1: coordinates=hip_flexion_l axis=(0 0 1) LinearFunction(coefficients=1 0)
          TransformAxis rotation2: coordinates=hip_adduction_l axis=(-1 0 0) LinearFunction(coefficients=1 0)
          TransformAxis rotation3: coordinates=hip_rotation_l axis=(0 -1 0) LinearFunction(coefficients=1 0)
    Body tibia_l: mass=3.322761 mass_center=(0 -0.200803 0) inertia_xx=0.05225182 inertia_yy=0.005287386
        inertia_zz=0.05297754 meshes=(l_tibia.vtp l_fibula.vtp)
      CustomJoint knee_l: parent_body=femur_l location_in_parent=(0 -0.4431863 0) location=(0 -0.02688849 0)
        Coordinate knee_angle_l: motion_type=rotational default_value=-7.242649e-8 range=(-2.094395 0.1745329)
            clamped=true
        SpatialTransform: axes_held_at_zero=(rotation2 rotation3 translation3)
          TransformAxis rotation1: coordinates=knee_angle_l axis=(0 0 1) LinearFunction(coefficients=1 0)
          TransformAxis translation1: coordinates=knee_angle_l axis=(1 0 0)
            MultiplierFunction: scale=1.096996
              SimmSpline: x=(-2.0944 -1.74533 -1.39626 -1.0472 -0.698132 -0.349066 -0.174533 0 0.197344 0.337395 0.490178 1.52146 2.0944)
                  y=(-0.0248506 -0.0228302 -0.0205102 -0.0175507 -0.0139497 -0.00955051 -0.00744121 -0.00525 -0.00032536 0.00284075 0.00619557 0.0195346 0.0164006)
          TransformAxis translation2: coordinates=knee_angle_l axis=(0 1 0)
            MultiplierFunction: scale=1.096996
              SimmSpline: x=(-2.0944 -1.22173 -0.523599 -0.349066 -0.174533 0 0.159149 2.0944)
                  y=(-0.00609989 -0.0127505 -0.0166506 -0.0170923 -0.0172202 -0.017 -0.0159841 0.0205001)
    Body patella_l: mass=0.08962268 mass_center=(0 0 0) inertia_xx=0.001078519 inertia_yy=0.001078519
        inertia_zz=0.001078519 meshes=l_patella.vtp
      CustomJoint pat_fem_l: parent_body=femur_l location_in_parent=(0 -0.4431863 0) location=(0 0 0)
        Coordinate patella_l_constrained_knee_angle: motion_type=rotational default_value=-7.242649e-8
            range=(-3.14 3.14) clamped=true is_free_to_satisfy_constraints=true
        SpatialTransform: axes_held_at_zero=(rotation2 rotation3 translation3)
          TransformAxis rotation1: coordinates=patella_l_constrained_knee_angle axis=(0 0 1)
            SimmSpline: x=(-2.0944 -1.45752 -0.526391 0 0.0523599 0.174533)
                y=(-1.68636 -1.09112 -0.256161 -0.0012 -0.0187016 -0.1054)
          TransformAxis translation1: coordinates=patella_l_constrained_knee_angle axis=(1 0 0)
            MultiplierFunction: scale=1.096996
              SimmSpline: x=(-2.0944 -1.91986 -1.5708 -1.39626 -1.0472 -0.698132 -0.349066 -0.174533 0 0.0872665 0.174533 2.0944)
                  y=(-0.03082 -0.02767 -0.01694 -0.00996 0.00548 0.0215 0.03599 0.04069 0.0451 0.04648 0.04761 0.04648)
          TransformAxis translation2: coordinates=patella_l_constrained_knee_angle axis=(0 1 0)
            MultiplierFunction: scale=1.096996
              SimmSpline: x=(-2.0944 -1.91986 -1.5708 -1.39626 -1.0472 -0.698132 -0.349066 -0.174533 0 0.0872665 0.174533 2.0944)
                  y=(-0.02263 -0.02892 -0.03914 -0.04244 -0.04469 -0.04063 -0.02973 -0.02297 -0.01452 -0.00979 -0.00496 -0.00979)
    Body talus_l: mass=0.08962268 mass_center=(0 0 0) inertia_xx=0.0009030235 inertia_yy=0.0009030235
        inertia_zz=0.0009030235 meshes=talus_lv.vtp
      CustomJoint ankle_l: parent_body=tibia_l location_in_parent=(0 -0.4624821 0) location=(0 0 0)
        Coordinate ankle_angle_l: motion_type=rotational default_value=1.384092e-10 range=(-1.047198 1.047198)
            clamped=true
        SpatialTransform: axes_held_at_zero=(rotation2 rotation3 translation1 translation2 translation3)
          TransformAxis rotation1: coordinates=ankle_angle_l axis=(0.1050135 0.1740224 0.9791263)
              LinearFunction(coefficients=1 0)
    Body calcn_l: mass=1.120283 mass_center=(0.100378 0.0301135 0) inertia_xx=0.001264233 inertia_yy=0.003521792
        inertia_zz=0.003702396 meshes=l_foot.vtp
      CustomJoint subtalar_l: parent_body=talus_l location_in_parent=(-0.04895458 -0.04210877 -0.007949975)
          location=(0 0 0)
        Coordinate subtalar_angle_l: motion_type=rotational default_value=-4.60633e-14 range=(-1.570796 1.570796)
            clamped=true
        SpatialTransform: axes_held_at_zero=(rotation2 rotation3 translation1 translation2 translation3)
          TransformAxis rotation1: coordinates=subtalar_angle_l axis=(-0.7871796 -0.6047475 -0.1209495)
              LinearFunction(coefficients=1 0)
    Body toes_l: mass=0.1941227 mass_center=(0.034731 0.00602271 0.0175662) inertia_xx=9.030235e-5
        inertia_yy=0.0001806047 inertia_zz=0.0009030235 meshes=l_bofoot.vtp
      CustomJoint mtp_l: parent_body=calcn_l location_in_parent=(0.1794767 -0.002007569 -0.001084087) location=(0 0 0)
        Coordinate mtp_angle_l: motion_type=rotational default_value=0 range=(-1.047198 1.047198) clamped=true
            locked=true
        SpatialTransform: axes_held_at_zero=(rotation2 rotation3 translation1 translation2 translation3)
          TransformAxis rotation1: coordinates=mtp_angle_l axis=(0.5809544 0 0.8139361)
              LinearFunction(coefficients=1 0)
    Body torso: mass=24.04272 mass_center=(-0.0307271 0.3267 0) inertia_xx=1.37969 inertia_yy=0.7103178
        inertia_zz=1.37969 meshes=(hat_spine.vtp hat_jaw.vtp hat_skull.vtp hat_ribs_scap.obj)
      CustomJoint back: parent_body=pelvis location_in_parent=(-0.09967843 0.08067321 0) location=(0 0 0)
        Coordinate lumbar_extension: motion_type=rotational default_value=9.23344e-7 range=(-1.570796 1.570796)
            clamped=true
        Coordinate lumbar_bending: motion_type=rotational default_value=4.544298e-7 range=(-1.570796 1.570796)
            clamped=true
        Coordinate lumbar_rotation: motion_type=rotational default_value=1.553159e-7 range=(-1.570796 1.570796)
            clamped=true
        SpatialTransform: axes_held_at_zero=(translation1 translation2 translation3)
          TransformAxis rotation1: coordinates=lumbar_extension axis=(0 0 1) LinearFunction(coefficients=1 0)
          TransformAxis rotation2: coordinates=lumbar_bending axis=(1 0 0) LinearFunction(coefficients=1 0)
          TransformAxis rotation3: coordinates=lumbar_rotation axis=(0 1 0) LinearFunction(coefficients=1 0)
    Body humerus_r: mass=1.821581 mass_center=(0 -0.179673 0) inertia_xx=0.01277216 inertia_yy=0.004406001
        inertia_zz=0.01433634 meshes=humerus_rv.vtp
      CustomJoint acromial_r: parent_body=torso location_in_parent=(0.003231465 0.3792788 0.1741202) location=(0 0 0)
        Coordinate arm_flex_r: motion_type=rotational default_value=0 range=(-1.570796 1.570796) clamped=true
        Coordinate arm_add_r: motion_type=rotational default_value=-1.041296e-9 range=(-2.094395 1.570796) clamped=true
        Coordinate arm_rot_r: motion_type=rotational default_value=0 range=(-1.570796 1.570796) clamped=true
        SpatialTransform: axes_held_at_zero=(translation1 translation2 translation3)
          TransformAxis rotation1: coordinates=arm_flex_r axis=(0 0 1) LinearFunction(coefficients=1 0)
          TransformAxis rotation2: coordinates=arm_add_r axis=(1 0 0) LinearFunction(coefficients=1 0)
          TransformAxis rotation3: coordinates=arm_rot_r axis=(0 1 0) LinearFunction(coefficients=1 0)
    Body ulna_r: mass=0.5444578 mass_center=(0 -0.13164 0) inertia_xx=0.003166846 inertia_yy=0.0006607397
        inertia_zz=0.003435205 meshes=ulna_rv.vtp
      CustomJoint elbow_r: parent_body=humerus_r location_in_parent=(0.0143562 -0.3126745 -0.0104799) location=(0 0 0)
        Coordinate elbow_flex_r: motion_type=rotational default_value=0.0001663658 range=(0 2.618) clamped=true
        SpatialTransform: axes_held_at_zero=(rotation2 rotation3 translation1 translation2 translation3)
          TransformAxis rotation1: coordinates=elbow_flex_r axis=(0.226047 0.022269 0.9738618)
              LinearFunction(coefficients=1 0)
    Body radius_r: mass=0.5444578 mass_center=(0 -0.13164 0) inertia_xx=0.003166846 inertia_yy=0.0006607397
        inertia_zz=0.003435205 meshes=radius_rv.vtp
      CustomJoint radioulnar_r: parent_body=ulna_r location_in_parent=(-0.007347396 -0.01420657 0.0284885)
          location=(0 0 0)
        Coordinate pro_sup_r: motion_type=rotational default_value=0.0001538929 range=(0 1.570796) clamped=true
        SpatialTransform: axes_held_at_zero=(rotation2 rotation3 translation1 translation2 translation3)
          TransformAxis rotation1: coordinates=pro_sup_r axis=(0.05639803 0.9984065 0.001952)
              LinearFunction(coefficients=1 0)
    Body hand_r: mass=0.4100238 mass_center=(0 -0.074375 0) inertia_xx=0.000953689 inertia_yy=0.0005848295
        inertia_zz=0.001432672
        meshes=(pisiform_rvs.vtp lunate_rvs.vtp scaphoid_rvs.vtp triquetrum_rvs.vtp hamate_rvs.vtp capitate_rvs.vtp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)
      CustomJoint radius_hand_r: parent_body=radius_r location_in_parent=(-0.009608301 -0.2575914 0.01486518)
          location=(0 0 0)
        Coordinate wrist_flex_r: motion_type=rotational default_value=0 range=(-1.22173 1.22173) clamped=true
        Coordinate wrist_dev_r: motion_type=rotational default_value=7.941633e-9 range=(-0.4363323 0.6108652)
            clamped=true
        SpatialTransform: axes_held_at_zero=(rotation3 translation1 translation2 translation3)
          TransformAxis rotation1: coordinates=wrist_flex_r axis=(0 0 1) LinearFunction(coefficients=1 0)
          TransformAxis rotation2: coordinates=wrist_dev_r axis=(1 0 0) LinearFunction(coefficients=1 0)
    Body humerus_l: mass=1.821581 mass_center=(0 -0.180458 0) inertia_xx=0.01288399 inertia_yy=0.004444577
        inertia_zz=0.01446186 meshes=humerus_lv.vtp
      CustomJoint acromial_l: parent_body=torso location_in_parent=(0.003231465 0.3792788 -0.1741202) location=(0 0 0)
        Coordinate arm_flex_l: motion_type=rotational default_value=0 range=(-1.570796 1.570796) clamped=true
        Coordinate arm_add_l: motion_type=rotational default_value=-2.121757e-9 range=(-2.094395 1.570796) clamped=true
        Coordinate arm_rot_l: motion_type=rotational default_value=0 range=(-1.570796 1.570796) clamped=true
        SpatialTransform: axes_held_at_zero=(translation1 translation2 translation3)
          TransformAxis rotation1: coordinates=arm_flex_l axis=(0 0 1) LinearFunction(coefficients=1 0)
          TransformAxis rotation2: coordinates=arm_add_l axis=(-1 0 0) LinearFunction(coefficients=1 0)
          TransformAxis rotation3: coordinates=arm_rot_l axis=(0 -1 0) LinearFunction(coefficients=1 0)
    Body ulna_l: mass=0.5444578 mass_center=(0 -0.132215 0) inertia_xx=0.003194574 inertia_yy=0.0006665248
        inertia_zz=0.003465282 meshes=ulna_lv.vtp
      CustomJoint elbow_l: parent_body=humerus_l location_in_parent=(0.01441891 -0.3140403 0.01052567) location=(0 0 0)
        Coordinate elbow_flex_l: motion_type=rotational default_value=0.0001437935 range=(0 2.618) clamped=true
        SpatialTransform: axes_held_at_zero=(rotation2 rotation3 translation1 translation2 translation3)
          TransformAxis rotation1: coordinates=elbow_flex_l axis=(-0.226047 -0.022269 0.9738618)
              LinearFunction(coefficients=1 0)
    Body radius_l: mass=0.5444578 mass_center=(0 -0.132215 0) inertia_xx=0.003194574 inertia_yy=0.0006665248
        inertia_zz=0.003465282 meshes=radius_lv.vtp
      CustomJoint radioulnar_l: parent_body=ulna_l location_in_parent=(-0.007379491 -0.01426862 -0.02861294)
          location=(0 0 0)
        Coordinate pro_sup_l: motion_type=rotational default_value=0.0001208549 range=(0 1.570796) clamped=true
        SpatialTransform: axes_held_at_zero=(rotation2 rotation3 translation1 translation2 translation3)
          TransformAxis rotation1: coordinates=pro_sup_l axis=(-0.05639803 -0.9984065 0.001952)
              LinearFunction(coefficients=1 0)
    Body hand_l: mass=0.4100238 mass_center=(0 -0.0746999 0) inertia_xx=0.0009620391 inertia_yy=0.00058995
        inertia_zz=0.001445216
        meshes=(pisiform_lvs.vtp lunate_lvs.vtp scaphoid_lvs.vtp triquetrum_lvs.vtp hamate_lvs.vtp capitate_lvs.vtp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)
      CustomJoint radius_hand_l: parent_body=radius_l location_in_parent=(-0.009650272 -0.2587166 -0.01493011)
          location=(0 0 0)
        Coordinate wrist_flex_l: motion_type=rotational default_value=0 range=(-1.22173 1.22173) clamped=true
        Coordinate wrist_dev_l: motion_type=rotational default_value=4.982949e-9 range=(-0.4363323 0.6108652)
            clamped=true
        SpatialTransform: axes_held_at_zero=(rotation3 translation1 translation2 translation3)
          TransformAxis rotation1: coordinates=wrist_flex_l axis=(0 0 1) LinearFunction(coefficients=1 0)
          TransformAxis rotation2: coordinates=wrist_dev_l axis=(-1 0 0) LinearFunction(coefficients=1 0)
  ConstraintSet:
    CoordinateCouplerConstraint patalla_r_coupler: independent_coordinate_names=knee_angle_r
        dependent_coordinate_name=patella_r_constrained_knee_angle scale_factor=1
      coupled_coordinates_function: SimmSpline: x=(-2.0944 -1.45752 -0.526391 0 0.0523599 0.174533)
          y=(-2.0944 -1.45752 -0.526391 0 0.0523599 0.174533)
    CoordinateCouplerConstraint patella_l_coupler: independent_coordinate_names=knee_angle_l
        dependent_coordinate_name=patella_l_constrained_knee_angle scale_factor=1
      coupled_coordinates_function: SimmSpline: x=(-2.0944 -1.99997 -1.45752 -0.526391 0.0279253 0.174533)
          y=(-2.0944 -1.99997 -1.45752 -0.526391 0.0279253 0.174533)
  ForceSet:
    ElasticFoundationForce foot_floor_r: transition_velocity=0.1
      ContactParametersSet contact_parameters:
        ContactParameters: geometry=(platform_contact foot_r) stiffness=50000000 dissipation=5 static_friction=0.9
            dynamic_friction=0.9 viscous_friction=0.9
    ElasticFoundationForce foot_floor_l: transition_velocity=0.1
      ContactParametersSet contact_parameters:
        ContactParameters: geometry=(platform_contact foot_l) stiffness=50000000 dissipation=5 static_friction=0.9
            dynamic_friction=0.9 viscous_friction=0.9
    BushingForce BackBushing: body_1=pelvis body_2=torso location_body_1=(-0.1007 0.0815 0) orientation_body_1=(0 0 0)
        location_body_2=(0 0 0) orientation_body_2=(0 0 0) rotational_stiffness=(50 50 10) [Nm/rad]
        translational_stiffness=(0 0 0) [N/m] rotational_damping=(1 1 0) [Nm/(rad/s)]
        translational_damping=(0 0 0) [N/(m/s)]
    ExpressionBasedBushingForce cubic_ankle_bushing_r: body_1=tibia_r body_2=calcn_r location_body_1=(0 -0.43 0)
        orientation_body_1=(0 0 0) location_body_2=(0.04877 0.04195 -0.00792) orientation_body_2=(0 0 0)
        Mx_expression=9.52095038*theta_x-29.57608094*theta_x^2+169.01588105*theta_x^3
        My_expression=3.61796125*theta_y-10.1612135*theta_y^2+64.5279144*theta_y^3
        Mz_expression=5.98187224*theta_z+15.74951827*theta_z^2+33.6780792*theta_z^3 Fx_expression=0 Fy_expression=0
        Fz_expression=0 rotational_damping=(0 0 0) translational_damping=(0 0 0) moment_visual_scale=1
        force_visual_scale=1 visual_aspect_ratio=10
    ExpressionBasedBushingForce cubic_ankle_bushing_l: body_1=tibia_l body_2=calcn_l location_body_1=(0 -0.43 0)
        orientation_body_1=(0 0 0) location_body_2=(0.04877 0.04195 0.00792) orientation_body_2=(0 0 0)
        Mx_expression=9.52095038*theta_x+29.57608094*theta_x^2+169.01588105*theta_x^3
        My_expression=3.61796125*theta_y+10.1612135*theta_y^2+64.5279144*theta_y^3
        Mz_expression=5.98187224*theta_z+15.74951827*theta_z^2+33.6780792*theta_z^3 Fx_expression=0 Fy_expression=0
        Fz_expression=0 rotational_damping=(0 0 0) translational_damping=(0 0 0) moment_visual_scale=1
        force_visual_scale=1 visual_aspect_ratio=10
    CoordinateLimitForce LumbarExtensionLimit: coordinate=lumbar_extension upper_stiffness=20 [N*m/degree]
        upper_limit=25 [degrees] lower_stiffness=20 [N*m/degree] lower_limit=-35 [degrees] damping=0.25
        transition=10 [degrees]
    CoordinateLimitForce KneeLimit_r: coordinate=knee_angle_r upper_stiffness=20 upper_limit=-5 lower_stiffness=10
        lower_limit=-120 damping=0.25 transition=10
    CoordinateLimitForce KneeLimit_l: coordinate=knee_angle_l upper_stiffness=20 upper_limit=-5 lower_stiffness=10
        lower_limit=-120 damping=0.25 transition=10
    Thelen2003Muscle [values shared by the 92 below unless stated]: min_control=0.01 max_control=1 optimal_force=1
        max_contraction_velocity=10 default_activation=0.05 default_fiber_length=0.1 activation_time_constant=0.01
        deactivation_time_constant=0.04 FmaxTendonStrain=0.033 FmaxMuscleStrain=0.6 KshapeActive=0.5 KshapePassive=4
        Af=0.3 Flen=1.8
    Thelen2003Muscle glut_med1_r: max_isometric_force=819 optimal_fiber_length=0.05427707
        tendon_slack_length=0.07913292 pennation_angle_at_optimal=0.1396263
      PathPoint P1: pelvis (-0.0403861 0.0300916 0.119674)
      PathPoint P2: femur_r (-0.0238105 -0.012779 0.0606185)
    Thelen2003Muscle glut_med2_r: max_isometric_force=573 optimal_fiber_length=0.08576538
        tendon_slack_length=0.05379367 pennation_angle_at_optimal=0
      PathPoint P1: pelvis (-0.0846326 0.0440486 0.0758229)
      PathPoint P2: femur_r (-0.0281794 -0.0063349 0.0575602)
    Thelen2003Muscle glut_med3_r: max_isometric_force=653 optimal_fiber_length=0.06588862
        tendon_slack_length=0.05405723 pennation_angle_at_optimal=0.3316126
      PathPoint P1: pelvis (-0.121059 0.0103935 0.0641426)
      PathPoint P2: femur_r (-0.0337497 -0.00513346 0.0565772)
    Thelen2003Muscle glut_min1_r: max_isometric_force=270 optimal_fiber_length=0.07031353
        tendon_slack_length=0.01654436 pennation_angle_at_optimal=0.1745329
      PathPoint P1: pelvis (-0.0462262 -0.00791884 0.104529)
      PathPoint P2: femur_r (-0.00786402 -0.0113591 0.0611646)
    Thelen2003Muscle glut_min2_r: max_isometric_force=285 optimal_fiber_length=0.05816012
        tendon_slack_length=0.02700291 pennation_angle_at_optimal=0
      PathPoint P1: pelvis (-0.0626578 -0.00643406 0.0980947)
      PathPoint P2: femur_r (-0.0104854 -0.0113591 0.0611646)
    Thelen2003Muscle glut_min3_r: max_isometric_force=323 optimal_fiber_length=0.0394801 tendon_slack_length=0.05298645
        pennation_angle_at_optimal=0.01745329
      PathPoint P1: pelvis (-0.0825539 -0.00623609 0.0847316)
      PathPoint P2: femur_r (-0.014745 -0.00906547 0.0600724)
    Thelen2003Muscle semimem_r: max_isometric_force=1288 optimal_fiber_length=0.08793134 tendon_slack_length=0.3945919
        pennation_angle_at_optimal=0.2617994
      PathPoint P1: pelvis (-0.117991 -0.0964812 0.0707846)
      ConditionalPathPoint P2: tibia_r (-0.037608 -0.0380295 -0.0204358) range=(-0.558505 0.174533)
          coordinate=knee_angle_r
      PathPoint P3: tibia_r (-0.0291786 -0.0515597 -0.0211491)
    Thelen2003Muscle semiten_r: max_isometric_force=410 optimal_fiber_length=0.2210163 tendon_slack_length=0.2809436
        pennation_angle_at_optimal=0.08726646
      PathPoint P1: pelvis (-0.125068 -0.108765 0.0597774)
      ConditionalPathPoint P2: tibia_r (-0.0454214 -0.0308969 -0.0246073) range=(-0.331613 0.174533)
          coordinate=knee_angle_r
      PathPoint P3: tibia_r (-0.0359005 -0.057082 -0.0247262)
      PathPoint P4: tibia_r (-0.0122118 -0.0806194 -0.0264769)
      PathPoint P5: tibia_r (0.00291786 -0.103314 -0.0208573)
    Thelen2003Muscle bifemlh_r: max_isometric_force=896 optimal_fiber_length=0.1198065 tendon_slack_length=0.3583202
        pennation_angle_at_optimal=0
      PathPoint P1: pelvis (-0.124682 -0.101529 0.0687356)
      PathPoint P2: tibia_r (-0.0325287 -0.0389048 0.0318047)
      PathPoint P3: tibia_r (-0.0252881 -0.0608428 0.0370676)
    Thelen2003Muscle bifemsh_r: max_isometric_force=804 optimal_fiber_length=0.18864 tendon_slack_length=0.09704602
        pennation_angle_at_optimal=0.4014257
      PathPoint P1: femur_r (0.00546112 -0.230569 0.0255581)
      PathPoint P2: tibia_r (-0.0325287 -0.0389048 0.0318047)
      PathPoint P3: tibia_r (-0.0252881 -0.0608428 0.0370676)
    Thelen2003Muscle sar_r: max_isometric_force=156 optimal_fiber_length=0.5599292 tendon_slack_length=0.1076787
        pennation_angle_at_optimal=0
      PathPoint P1: pelvis (-0.0151448 -0.00128681 0.12294)
      PathPoint P2: femur_r (-0.00327667 -0.389706 -0.0459827)
      PathPoint P3: tibia_r (-0.00605186 -0.0452809 -0.0431195)
      PathPoint P4: tibia_r (0.00648414 -0.0636526 -0.0413904)
      PathPoint P5: tibia_r (0.0262607 -0.0907779 -0.0272334)
    Thelen2003Muscle add_long_r: max_isometric_force=627 optimal_fiber_length=0.1496212 tendon_slack_length=0.1192633
        pennation_angle_at_optimal=0.1047198
      PathPoint P1: pelvis (-0.0312794 -0.0827519 0.0167286)
      PathPoint P2: femur_r (0.00546112 -0.230569 0.0255581)
    Thelen2003Muscle add_brev_r: max_isometric_force=429 optimal_fiber_length=0.1422848 tendon_slack_length=0.02139621
        pennation_angle_at_optimal=0
      PathPoint P1: pelvis (-0.0581045 -0.0905718 0.0162336)
      PathPoint P2: femur_r (0.000983002 -0.13063 0.0321114)
    Thelen2003Muscle add_mag1_r: max_isometric_force=381 optimal_fiber_length=0.09404025 tendon_slack_length=0.06485535
        pennation_angle_at_optimal=0.08726646
      PathPoint P1: pelvis (-0.0724574 -0.116209 0.0252413)
      PathPoint P2: femur_r (-0.00491501 -0.132268 0.0370264)
    Thelen2003Muscle add_mag2_r: max_isometric_force=343 optimal_fiber_length=0.1339624 tendon_slack_length=0.1328553
        pennation_angle_at_optimal=0.05235988
      PathPoint P1: pelvis (-0.082257 -0.117991 0.0304875)
      PathPoint P2: femur_r (0.00589801 -0.249573 0.0247935)
    Thelen2003Muscle add_mag3_r: max_isometric_force=488 optimal_fiber_length=0.1447246 tendon_slack_length=0.2750872
        pennation_angle_at_optimal=0.08726646
      PathPoint P1: pelvis (-0.109953 -0.112972 0.0483247)
      PathPoint P2: femur_r (0.00764557 -0.419087 -0.0290532)
    Thelen2003Muscle tfl_r: max_isometric_force=233 optimal_fiber_length=0.1022006 tendon_slack_length=0.4572132
        pennation_angle_at_optimal=0.05235988
      PathPoint P1: pelvis (-0.0307845 0.0211829 0.122841)
      PathPoint P2: femur_r (0.0321114 -0.108676 0.0652058)
      PathPoint P3: femur_r (0.00589801 -0.442242 0.0389924)
      PathPoint P4: tibia_r (0.00648414 -0.0526296 0.0320965)
    Thelen2003Muscle pect_r: max_isometric_force=266 optimal_fiber_length=0.1066512 tendon_slack_length=0.0351949
        pennation_angle_at_optimal=0
      PathPoint P1: pelvis (-0.0426628 -0.0760209 0.0446425)
      PathPoint P2: femur_r (-0.0133251 -0.0897809 0.0276333)
    Thelen2003Muscle grac_r: max_isometric_force=162 optimal_fiber_length=0.387927 tendon_slack_length=0.1388602
        pennation_angle_at_optimal=0.05235988
      PathPoint P1: pelvis (-0.0732592 -0.117496 0.0276566)
      ConditionalPathPoint P2: tibia_r (-0.0287139 -0.034474 -0.0407852) range=(-0.436332 0.174533)
          coordinate=knee_angle_r
      PathPoint P3: tibia_r (-0.0209978 -0.0556879 -0.0386887)
      PathPoint P4: tibia_r (0.00648414 -0.0903456 -0.0246397)
    Thelen2003Muscle glut_max1_r: max_isometric_force=573 optimal_fiber_length=0.1456294 tendon_slack_length=0.1281949
        pennation_angle_at_optimal=0.08726646
      PathPoint P1: pelvis (-0.118288 0.0605791 0.0692899)
      PathPoint P2: pelvis (-0.12779 0.00118783 0.0877012)
      PathPoint P3: femur_r (-0.0499147 -0.0270872 0.0428152)
      PathPoint P4: femur_r (-0.0302546 -0.0618199 0.0513346)
    Thelen2003Muscle glut_max2_r: max_isometric_force=819 optimal_fiber_length=0.1528122 tendon_slack_length=0.1320214
        pennation_angle_at_optimal=0
      PathPoint P1: pelvis (-0.133531 0.0174215 0.0557289)
      PathPoint P2: pelvis (-0.136204 -0.0514725 0.0904728)
      PathPoint P3: femur_r (-0.0465288 -0.0578879 0.0320022)
      PathPoint P4: femur_r (-0.0170387 -0.11097 0.0457642)
    Thelen2003Muscle glut_max3_r: max_isometric_force=552 optimal_fiber_length=0.1498036 tendon_slack_length=0.150844
        pennation_angle_at_optimal=0.08726646
      PathPoint P1: pelvis (-0.154021 -0.0310815 0.00574116)
      PathPoint P2: pelvis (-0.151349 -0.104133 0.0398912)
      PathPoint P3: femur_r (-0.0326575 -0.113701 0.014745)
      PathPoint P4: femur_r (-0.00655335 -0.154987 0.0448904)
    Thelen2003Muscle iliacus_r: max_isometric_force=1073 optimal_fiber_length=0.1020691 tendon_slack_length=0.1020691
        pennation_angle_at_optimal=0.1221731
      PathPoint P1: pelvis (-0.0667162 0.0361297 0.0845336)
      PathPoint P2: pelvis (-0.0255383 -0.054442 0.0802773)
      ConditionalPathPoint P3: pelvis (-0.0285078 -0.0796834 0.0807722) range=(-1.5708 0.785398)
          coordinate=hip_flexion_r
      PathPoint P4: femur_r (0.00185678 -0.0593078 0.00622568)
      PathPoint P5: femur_r (-0.0210799 -0.0678272 0.0140897)
    Thelen2003Muscle psoas_r: max_isometric_force=1113 optimal_fiber_length=0.1012433 tendon_slack_length=0.1619893
        pennation_angle_at_optimal=0.1396263
      PathPoint P1: pelvis (-0.0640436 0.0878002 0.0286068)
      PathPoint P2: pelvis (-0.0235586 -0.0564218 0.07513)
      ConditionalPathPoint P3: pelvis (-0.0285078 -0.0796834 0.0807722) range=(-1.5708 0.785398)
          coordinate=hip_flexion_r
      PathPoint P4: femur_r (0.00174756 -0.0553758 0.00415045)
      PathPoint P5: femur_r (-0.0205338 -0.0652058 0.0113591)
    Thelen2003Muscle quad_fem_r: max_isometric_force=381 optimal_fiber_length=0.05571574 tendon_slack_length=0.02476255
        pennation_angle_at_optimal=0
      PathPoint P1: pelvis (-0.11314 -0.113932 0.0514725)
      PathPoint P2: femur_r (-0.0416138 -0.0392109 0.0399754)
    Thelen2003Muscle gem_r: max_isometric_force=164 optimal_fiber_length=0.02500714 tendon_slack_length=0.04063661
        pennation_angle_at_optimal=0
      PathPoint P1: pelvis (-0.112151 -0.0811681 0.0706757)
      PathPoint P2: femur_r (-0.0155096 -0.00360434 0.0483856)
    Thelen2003Muscle peri_r: max_isometric_force=444 optimal_fiber_length=0.02630991 tendon_slack_length=0.1163708
        pennation_angle_at_optimal=0.1745329
      PathPoint P1: pelvis (-0.138184 0.000296957 0.0232616)
      PathPoint P2: pelvis (-0.11809 -0.02732 0.0650335)
      PathPoint P3: femur_r (-0.0161649 -0.00393201 0.0477302)
    Thelen2003Muscle rect_fem_r: max_isometric_force=1169 optimal_fiber_length=0.1236598 tendon_slack_length=0.4360636
        pennation_angle_at_optimal=0.08726646
      PathPoint P1: pelvis (-0.0292007 -0.0307845 0.095818)
      ConditionalPathPoint P2: femur_r (0.0364803 -0.440167 0.00207523) range=(-2.61799 -1.45997)
          coordinate=knee_angle_r
      PathPoint P3: patella_r (0.0132159 0.0477302 -0.00109222)
      PathPoint P4: patella_r (0.00546112 0.00270306 3.76708e-5)
      PathPoint P5: tibia_r (0.0409493 -0.0771811 0.000716486)
    Thelen2003Muscle vas_med_r: max_isometric_force=1294 optimal_fiber_length=0.09708777 tendon_slack_length=0.2399922
        pennation_angle_at_optimal=0.08726646
      PathPoint P1: femur_r (0.0152911 -0.229258 0.0205338)
      PathPoint P2: femur_r (0.0388832 -0.302437 0.000983002)
      ConditionalPathPoint P3: femur_r (0.0404123 -0.442133 -0.0136528) range=(-2.61799 -1.21004)
          coordinate=knee_angle_r
      ConditionalPathPoint P4: femur_r (0.029927 -0.464742 -0.0143081) range=(-2.61799 -1.78006)
          coordinate=knee_angle_r
      PathPoint P5: patella_r (0.00688102 0.048604 -0.0185678)
      PathPoint P6: patella_r (0.00546112 0.0026978 -0.00928011)
      PathPoint P7: tibia_r (0.0401854 -0.0776686 -0.0061093)
    Thelen2003Muscle vas_int_r: max_isometric_force=1365 optimal_fiber_length=0.0949112 tendon_slack_length=0.2509147
        pennation_angle_at_optimal=0.05235988
      PathPoint P1: femur_r (0.0316745 -0.210144 0.033859)
      PathPoint P2: femur_r (0.0365895 -0.22762 0.0311284)
      ConditionalPathPoint P3: femur_r (0.0374633 -0.440167 0.00600724) range=(-2.61799 -1.42) coordinate=knee_angle_r
      PathPoint P4: patella_r (0.0063349 0.0524268 -0.000655335)
      PathPoint P5: patella_r (0.00546112 0.0026978 -0.000430205)
      PathPoint P6: tibia_r (0.0409164 -0.0772727 0.000757617)
    Thelen2003Muscle vas_lat_r: max_isometric_force=1871 optimal_fiber_length=0.09164419 tendon_slack_length=0.2716596
        pennation_angle_at_optimal=0.08726646
      PathPoint P1: femur_r (0.00524268 -0.202498 0.0381186)
      PathPoint P2: femur_r (0.0293808 -0.282995 0.044672)
      ConditionalPathPoint P3: femur_r (0.0394293 -0.440167 0.0223906) range=(-2.61799 -1.21004)
          coordinate=knee_angle_r
      ConditionalPathPoint P4: femur_r (0.0276333 -0.463431 0.0200969) range=(-2.61799 -1.92004)
          coordinate=knee_angle_r
      PathPoint P5: patella_r (0.0112499 0.0462011 0.0154004)
      PathPoint P6: patella_r (0.00546112 0.0026978 0.00800611)
      PathPoint P7: tibia_r (0.0408825 -0.0774645 0.00674352)
    Thelen2003Muscle med_gas_r: max_isometric_force=1558 optimal_fiber_length=0.06483107 tendon_slack_length=0.4214019
        pennation_angle_at_optimal=0.296706
      PathPoint P1: femur_r (-0.0207523 -0.429135 -0.0256673)
      ConditionalPathPoint P2: femur_r (-0.0327667 -0.439293 -0.0281794) range=(-0.785398 0.174533)
          coordinate=knee_angle_r
      PathPoint P3: calcn_r (0 0.0324443 -0.00554693)
    Thelen2003Muscle lat_gas_r: max_isometric_force=683 optimal_fiber_length=0.06914876 tendon_slack_length=0.4105708
        pennation_angle_at_optimal=0.1396263
      PathPoint P1: femur_r (-0.0240289 -0.430992 0.0297085)
      ConditionalPathPoint P2: femur_r (-0.0327667 -0.438856 0.029927) range=(-0.785398 0.174533)
          coordinate=knee_angle_r
      PathPoint P3: calcn_r (0 0.0324443 -0.00554693)
    Thelen2003Muscle soleus_r: max_isometric_force=3549 optimal_fiber_length=0.05392673 tendon_slack_length=0.2696337
        pennation_angle_at_optimal=0.4363323
      PathPoint P1: tibia_r (-0.00259365 -0.16567 0.00767289)
      PathPoint P2: calcn_r (0 0.0324443 -0.00554693)
    Thelen2003Muscle tib_post_r: max_isometric_force=1588 optimal_fiber_length=0.03336417 tendon_slack_length=0.3336417
        pennation_angle_at_optimal=0.2094395
      PathPoint P1: tibia_r (-0.0101585 -0.145677 0.00205331)
      PathPoint P2: tibia_r (-0.0155619 -0.437787 -0.0247478)
      PathPoint P3: calcn_r (0.0436428 0.0349561 -0.0299325)
      PathPoint P4: calcn_r (0.0807967 0.0166408 -0.0294092)
    Thelen2003Muscle flex_dig_r: max_isometric_force=310 optimal_fiber_length=0.0361983 tendon_slack_length=0.4258624
        pennation_angle_at_optimal=0.1221731
      PathPoint P1: tibia_r (-0.00896972 -0.221109 -0.00194524)
      PathPoint P2: tibia_r (-0.0166426 -0.437787 -0.0211815)
      PathPoint P3: calcn_r (0.0456313 0.0329676 -0.0293045)
      PathPoint P4: calcn_r (0.0740986 0.01842 -0.0275253)
      PathPoint P5: calcn_r (0.173525 -0.00847738 0.0121404)
      PathPoint P6: toes_r (-0.00198852 -0.0081634 0.0153849)
      PathPoint P7: toes_r (0.0298278 -0.00743079 0.0225017)
      PathPoint P8: toes_r (0.0461546 -0.00627954 0.0253275)
    Thelen2003Muscle flex_hal_r: max_isometric_force=322 optimal_fiber_length=0.0457217 tendon_slack_length=0.4040522
        pennation_angle_at_optimal=0.1745329
      PathPoint P1: tibia_r (-0.00853745 -0.252233 0.0263688)
      PathPoint P2: tibia_r (-0.0201008 -0.440813 -0.018804)
      PathPoint P3: calcn_r (0.0391425 0.0288859 -0.0252228)
      PathPoint P4: calcn_r (0.108636 0.00711681 -0.0267927)
      PathPoint P5: calcn_r (0.180641 -0.00554693 -0.0281533)
      PathPoint P6: toes_r (0.0162221 -0.00669818 -0.0277346)
      PathPoint P7: toes_r (0.0588184 -0.0106752 -0.0189433)
    Thelen2003Muscle tib_ant_r: max_isometric_force=905 optimal_fiber_length=0.1052893 tendon_slack_length=0.2395869
        pennation_angle_at_optimal=0.08726646
      PathPoint P1: tibia_r (0.0193443 -0.175504 0.0124279)
      PathPoint P2: tibia_r (0.0355547 -0.42698 -0.0191282)
      PathPoint P3: calcn_r (0.122032 0.0186293 -0.031921)
    Thelen2003Muscle per_brev_r: max_isometric_force=435 optimal_fiber_length=0.0537344 tendon_slack_length=0.1730248
        pennation_angle_at_optimal=0.08726646
      PathPoint P1: tibia_r (-0.00756482 -0.28595 0.0351224)
      PathPoint P2: tibia_r (-0.0213976 -0.45216 0.0305835)
      PathPoint P3: tibia_r (-0.0155619 -0.464156 0.0312319)
      PathPoint P4: calcn_r (0.0492944 0.0282579 0.0243855)
      PathPoint P5: calcn_r (0.0708541 0.0229203 0.035898)
    Thelen2003Muscle per_long_r: max_isometric_force=943 optimal_fiber_length=0.05247963 tendon_slack_length=0.3694994
        pennation_angle_at_optimal=0.1745329
      PathPoint P1: tibia_r (0.000540345 -0.169452 0.039121)
      PathPoint P2: tibia_r (-0.0223703 -0.45443 0.0309077)
      PathPoint P3: tibia_r (-0.0175072 -0.46675 0.0312319)
      PathPoint P4: calcn_r (0.0458406 0.0240716 0.0231296)
      PathPoint P5: calcn_r (0.0712728 0.0110939 0.0297232)
      PathPoint P6: calcn_r (0.0891695 0.00722147 0.0123498)
      PathPoint P7: calcn_r (0.125905 0.00889601 -0.0192573)
    Thelen2003Muscle per_tert_r: max_isometric_force=180 optimal_fiber_length=0.08472389 tendon_slack_length=0.1072454
        pennation_angle_at_optimal=0.2268928
      PathPoint P1: tibia_r (0.00108069 -0.303025 0.0249639)
      PathPoint P2: tibia_r (0.0247478 -0.439732 0.017183)
      PathPoint P3: calcn_r (0.0896928 0.0238623 0.031293)
    Thelen2003Muscle ext_dig_r: max_isometric_force=512 optimal_fiber_length=0.1089582 tendon_slack_length=0.3685352
        pennation_angle_at_optimal=0.1396263
      PathPoint P1: tibia_r (0.00345821 -0.149243 0.029827)
      PathPoint P2: tibia_r (0.0312319 -0.433032 0.00778096)
      PathPoint P3: calcn_r (0.0964956 0.0406077 -0.000104659)
      PathPoint P4: calcn_r (0.169129 0.00575624 0.0136057)
      PathPoint P5: toes_r (0.000313977 0.00491897 0.0160128)
      PathPoint P6: toes_r (0.0463639 -0.000418636 0.0261647)
    Thelen2003Muscle ext_hal_r: max_isometric_force=162 optimal_fiber_length=0.118398 tendon_slack_length=0.3253279
        pennation_angle_at_optimal=0.1047198
      PathPoint P1: tibia_r (0.00129683 -0.190958 0.0246397)
      PathPoint P2: tibia_r (0.0352305 -0.430655 -0.00918586)
      PathPoint P3: calcn_r (0.101519 0.0407123 -0.022083)
      PathPoint P4: calcn_r (0.135324 0.0323396 -0.0268974)
      PathPoint P5: calcn_r (0.181479 0.0145476 -0.0293045)
      PathPoint P6: toes_r (0.0311884 0.00429102 -0.0256415)
      PathPoint P7: toes_r (0.058923 0.00355841 -0.0194666)
    Thelen2003Muscle glut_med1_l: max_isometric_force=819 optimal_fiber_length=0.05434118
        tendon_slack_length=0.07922639 pennation_angle_at_optimal=0.1396263
      PathPoint P1: pelvis (-0.0403861 0.0300916 -0.119674)
      PathPoint P2: femur_l (-0.0239145 -0.0128349 -0.0608833)
    Thelen2003Muscle glut_med2_l: max_isometric_force=573 optimal_fiber_length=0.08586732
        tendon_slack_length=0.05385761 pennation_angle_at_optimal=0
      PathPoint P1: pelvis (-0.0846326 0.0440486 -0.0758229)
      PathPoint P2: femur_l (-0.0283025 -0.00636258 -0.0578117)
    Thelen2003Muscle glut_med3_l: max_isometric_force=653 optimal_fiber_length=0.06598276
        tendon_slack_length=0.05413446 pennation_angle_at_optimal=0.3316126
      PathPoint P1: pelvis (-0.121059 0.0103935 -0.0641426)
      PathPoint P2: femur_l (-0.0338972 -0.00515588 -0.0568244)
    Thelen2003Muscle glut_min1_l: max_isometric_force=270 optimal_fiber_length=0.07045849
        tendon_slack_length=0.01657847 pennation_angle_at_optimal=0.1745329
      PathPoint P1: pelvis (-0.0462262 -0.00791884 -0.104529)
      PathPoint P2: femur_l (-0.00789837 -0.0114088 -0.0614318)
    Thelen2003Muscle glut_min2_l: max_isometric_force=285 optimal_fiber_length=0.05829088
        tendon_slack_length=0.02706362 pennation_angle_at_optimal=0
      PathPoint P1: pelvis (-0.0626578 -0.00643406 -0.0980947)
      PathPoint P2: femur_l (-0.0105312 -0.0114088 -0.0614318)
    Thelen2003Muscle glut_min3_l: max_isometric_force=323 optimal_fiber_length=0.03956901
        tendon_slack_length=0.05310577 pennation_angle_at_optimal=0.01745329
      PathPoint P1: pelvis (-0.0825539 -0.00623609 -0.0847316)
      PathPoint P2: femur_l (-0.0148094 -0.00910507 -0.0603348)
    Thelen2003Muscle semimem_l: max_isometric_force=1288 optimal_fiber_length=0.08829387 tendon_slack_length=0.3962187
        pennation_angle_at_optimal=0.2617994
      PathPoint P1: pelvis (-0.117991 -0.0964812 -0.0707846)
      ConditionalPathPoint P2: tibia_l (-0.0374288 -0.0378482 0.0203385) range=(-0.558505 0.174533)
          coordinate=knee_angle_l
      PathPoint P3: tibia_l (-0.0290396 -0.051314 0.0210483)
    Thelen2003Muscle semiten_l: max_isometric_force=410 optimal_fiber_length=0.2216958 tendon_slack_length=0.2818073
        pennation_angle_at_optimal=0.08726646
      PathPoint P1: pelvis (-0.125068 -0.108765 -0.0597774)
      ConditionalPathPoint P2: tibia_l (-0.0452049 -0.0307497 0.02449) range=(-0.331613 0.174533)
          coordinate=knee_angle_l
      PathPoint P3: tibia_l (-0.0357294 -0.05681 0.0246083)
      PathPoint P4: tibia_l (-0.0121536 -0.0802353 0.0263507)
      PathPoint P5: tibia_l (0.00290396 -0.102822 0.0207579)
    Thelen2003Muscle bifemlh_l: max_isometric_force=896 optimal_fiber_length=0.1202774 tendon_slack_length=0.3597289
        pennation_angle_at_optimal=0
      PathPoint P1: pelvis (-0.124682 -0.101529 -0.0687356)
      PathPoint P2: tibia_l (-0.0323737 -0.0387194 -0.0316531)
      PathPoint P3: tibia_l (-0.0251676 -0.0605529 -0.036891)
    Thelen2003Muscle bifemsh_l: max_isometric_force=804 optimal_fiber_length=0.1891951 tendon_slack_length=0.09733159
        pennation_angle_at_optimal=0.4014257
      PathPoint P1: femur_l (0.00548498 -0.231576 -0.0256697)
      PathPoint P2: tibia_l (-0.0323737 -0.0387194 -0.0316531)
      PathPoint P3: tibia_l (-0.0251676 -0.0605529 -0.036891)
    Thelen2003Muscle sar_l: max_isometric_force=156 optimal_fiber_length=0.5614348 tendon_slack_length=0.1079682
        pennation_angle_at_optimal=0
      PathPoint P1: pelvis (-0.0151448 -0.00128681 -0.12294)
      PathPoint P2: femur_l (-0.00329099 -0.391408 0.0461835)
      PathPoint P3: tibia_l (-0.00602302 -0.0450651 0.042914)
      PathPoint P4: tibia_l (0.00645324 -0.0633493 0.0411932)
      PathPoint P5: tibia_l (0.0261356 -0.0903453 0.0271036)
    Thelen2003Muscle add_long_l: max_isometric_force=627 optimal_fiber_length=0.1502319 tendon_slack_length=0.11975
        pennation_angle_at_optimal=0.1047198
      PathPoint P1: pelvis (-0.0312794 -0.0827519 -0.0167286)
      PathPoint P2: femur_l (0.00548498 -0.231576 -0.0256697)
    Thelen2003Muscle add_brev_l: max_isometric_force=429 optimal_fiber_length=0.1427874 tendon_slack_length=0.02147178
        pennation_angle_at_optimal=0
      PathPoint P1: pelvis (-0.0581045 -0.0905718 -0.0162336)
      PathPoint P2: femur_l (0.000987296 -0.131201 -0.0322517)
    Thelen2003Muscle add_mag1_l: max_isometric_force=381 optimal_fiber_length=0.09441765 tendon_slack_length=0.06511562
        pennation_angle_at_optimal=0.08726646
      PathPoint P1: pelvis (-0.0724574 -0.116209 -0.0252413)
      PathPoint P2: femur_l (-0.00493648 -0.132846 -0.0371882)
    Thelen2003Muscle add_mag2_l: max_isometric_force=343 optimal_fiber_length=0.1346271 tendon_slack_length=0.1335145
        pennation_angle_at_optimal=0.05235988
      PathPoint P1: pelvis (-0.082257 -0.117991 -0.0304875)
      PathPoint P2: femur_l (0.00592378 -0.250664 -0.0249018)
    Thelen2003Muscle add_mag3_l: max_isometric_force=488 optimal_fiber_length=0.145427 tendon_slack_length=0.2764223
        pennation_angle_at_optimal=0.08726646
      PathPoint P1: pelvis (-0.109953 -0.112972 -0.0483247)
      PathPoint P2: femur_l (0.00767897 -0.420917 0.0291801)
    Thelen2003Muscle tfl_l: max_isometric_force=233 optimal_fiber_length=0.1025524 tendon_slack_length=0.458787
        pennation_angle_at_optimal=0.05235988
      PathPoint P1: pelvis (-0.0307845 0.0211829 -0.122841)
      PathPoint P2: femur_l (0.0322517 -0.109151 -0.0654906)
      PathPoint P3: femur_l (0.00592378 -0.444174 -0.0391627)
      PathPoint P4: tibia_l (0.00645324 -0.0523788 -0.0319435)
    Thelen2003Muscle pect_l: max_isometric_force=266 optimal_fiber_length=0.1070118 tendon_slack_length=0.03531391
        pennation_angle_at_optimal=0
      PathPoint P1: pelvis (-0.0426628 -0.0760209 -0.0446425)
      PathPoint P2: femur_l (-0.0133833 -0.0901731 -0.027754)
    Thelen2003Muscle grac_l: max_isometric_force=162 optimal_fiber_length=0.3892333 tendon_slack_length=0.1393278
        pennation_angle_at_optimal=0.05235988
      PathPoint P1: pelvis (-0.0732592 -0.117496 -0.0276566)
      ConditionalPathPoint P2: tibia_l (-0.0285771 -0.0343097 0.0405909) range=(-0.436332 0.174533)
          coordinate=knee_angle_l
      PathPoint P3: tibia_l (-0.0208977 -0.0554226 0.0385043)
      PathPoint P4: tibia_l (0.00645324 -0.0899151 0.0245223)
    Thelen2003Muscle glut_max1_l: max_isometric_force=573 optimal_fiber_length=0.1458714 tendon_slack_length=0.128408
        pennation_angle_at_optimal=0.08726646
      PathPoint P1: pelvis (-0.118288 0.0605791 -0.0692899)
      PathPoint P2: pelvis (-0.12779 0.00118783 -0.0877012)
      PathPoint P3: femur_l (-0.0501327 -0.0272055 -0.0430022)
      PathPoint P4: femur_l (-0.0303868 -0.06209 -0.0515588)
    Thelen2003Muscle glut_max2_l: max_isometric_force=819 optimal_fiber_length=0.1531605 tendon_slack_length=0.1323224
        pennation_angle_at_optimal=0
      PathPoint P1: pelvis (-0.133531 0.0174215 -0.0557289)
      PathPoint P2: pelvis (-0.136204 -0.0514725 -0.0904728)
      PathPoint P3: femur_l (-0.046732 -0.0581408 -0.032142)
      PathPoint P4: femur_l (-0.0171131 -0.111455 -0.0459641)
    Thelen2003Muscle glut_max3_l: max_isometric_force=552 optimal_fiber_length=0.1501538 tendon_slack_length=0.1511966
        pennation_angle_at_optimal=0.08726646
      PathPoint P1: pelvis (-0.154021 -0.0310815 -0.00574116)
      PathPoint P2: pelvis (-0.151349 -0.104133 -0.0398912)
      PathPoint P3: femur_l (-0.0328002 -0.114197 -0.0148094)
      PathPoint P4: femur_l (-0.00658197 -0.155664 -0.0450865)
    Thelen2003Muscle iliacus_l: max_isometric_force=1073 optimal_fiber_length=0.1022158 tendon_slack_length=0.1022158
        pennation_angle_at_optimal=0.1221731
      PathPoint P1: pelvis (-0.0667162 0.0361297 -0.0845336)
      PathPoint P2: pelvis (-0.0255383 -0.054442 -0.0802773)
      ConditionalPathPoint P3: pelvis (-0.0285078 -0.0796834 -0.0807722) range=(-1.5708 0.785398)
          coordinate=hip_flexion_l
      PathPoint P4: femur_l (0.00186489 -0.0595669 -0.00625288)
      PathPoint P5: femur_l (-0.021172 -0.0681234 -0.0141512)
    Thelen2003Muscle psoas_l: max_isometric_force=1113 optimal_fiber_length=0.1013509 tendon_slack_length=0.1621615
        pennation_angle_at_optimal=0.1396263
      PathPoint P1: pelvis (-0.0640436 0.0878002 -0.0286068)
      PathPoint P2: pelvis (-0.0235586 -0.0564218 -0.07513)
      ConditionalPathPoint P3: pelvis (-0.0285078 -0.0796834 -0.0807722) range=(-1.5708 0.785398)
          coordinate=hip_flexion_l
      PathPoint P4: femur_l (0.00175519 -0.0556177 -0.00416858)
      PathPoint P5: femur_l (-0.0206235 -0.0654906 -0.0114088)
    Thelen2003Muscle quad_fem_l: max_isometric_force=381 optimal_fiber_length=0.05583025 tendon_slack_length=0.02481344
        pennation_angle_at_optimal=0
      PathPoint P1: pelvis (-0.11314 -0.113932 -0.0514725)
      PathPoint P2: femur_l (-0.0417955 -0.0393821 -0.04015)
    Thelen2003Muscle gem_l: max_isometric_force=164 optimal_fiber_length=0.02506699 tendon_slack_length=0.04073386
        pennation_angle_at_optimal=0
      PathPoint P1: pelvis (-0.112151 -0.0811681 -0.0706757)
      PathPoint P2: femur_l (-0.0155773 -0.00362009 -0.0485969)
    Thelen2003Muscle peri_l: max_isometric_force=444 optimal_fiber_length=0.02633739 tendon_slack_length=0.1164923
        pennation_angle_at_optimal=0.1745329
      PathPoint P1: pelvis (-0.138184 0.000296957 -0.0232616)
      PathPoint P2: pelvis (-0.11809 -0.02732 -0.0650335)
      PathPoint P3: femur_l (-0.0162355 -0.00394918 -0.0479387)
    Thelen2003Muscle rect_fem_l: max_isometric_force=1169 optimal_fiber_length=0.1240969 tendon_slack_length=0.4376049
        pennation_angle_at_optimal=0.08726646
      PathPoint P1: pelvis (-0.0292007 -0.0307845 -0.095818)
      ConditionalPathPoint P2: femur_l (0.0366397 -0.442089 -0.00208429) range=(-2.61799 -1.45997)
          coordinate=knee_angle_l
      PathPoint P3: patella_l (0.0132736 0.0479387 0.001097)
      PathPoint P4: patella_l (0.00548498 0.00271487 -3.78354e-5)
      PathPoint P5: tibia_l (0.0407541 -0.0768133 -0.000713072)
    Thelen2003Muscle vas_med_l: max_isometric_force=1294 optimal_fiber_length=0.09741297 tendon_slack_length=0.2407961
        pennation_angle_at_optimal=0.08726646
      PathPoint P1: femur_l (0.0153579 -0.230259 -0.0206235)
      PathPoint P2: femur_l (0.0390531 -0.303758 -0.000987296)
      ConditionalPathPoint P3: femur_l (0.0405888 -0.444064 0.0137124) range=(-2.61799 -1.21004)
          coordinate=knee_angle_l
      ConditionalPathPoint P4: femur_l (0.0300577 -0.466772 0.0143706) range=(-2.61799 -1.78006)
          coordinate=knee_angle_l
      PathPoint P5: patella_l (0.00691107 0.0488163 0.0186489)
      PathPoint P6: patella_l (0.00548498 0.00270958 0.00932065)
      PathPoint P7: tibia_l (0.0399939 -0.0772985 0.00608019)
    Thelen2003Muscle vas_int_l: max_isometric_force=1365 optimal_fiber_length=0.09523117 tendon_slack_length=0.2517606
        pennation_angle_at_optimal=0.05235988
      PathPoint P1: femur_l (0.0318129 -0.211062 -0.0340069)
      PathPoint P2: femur_l (0.0367494 -0.228614 -0.0312644)
      ConditionalPathPoint P3: femur_l (0.037627 -0.442089 -0.00603348) range=(-2.61799 -1.42) coordinate=knee_angle_l
      PathPoint P4: patella_l (0.00636258 0.0526558 0.000658197)
      PathPoint P5: patella_l (0.00548498 0.00270958 0.000432085)
      PathPoint P6: tibia_l (0.0407214 -0.0769045 -0.000754007)
    Thelen2003Muscle vas_lat_l: max_isometric_force=1871 optimal_fiber_length=0.09195621 tendon_slack_length=0.2725845
        pennation_angle_at_optimal=0.08726646
      PathPoint P1: femur_l (0.00526558 -0.203383 -0.0382852)
      PathPoint P2: femur_l (0.0295092 -0.284232 -0.0448671)
      ConditionalPathPoint P3: femur_l (0.0396015 -0.442089 -0.0224884) range=(-2.61799 -1.21004)
          coordinate=knee_angle_l
      ConditionalPathPoint P4: femur_l (0.027754 -0.465455 -0.0201847) range=(-2.61799 -1.92004)
          coordinate=knee_angle_l
      PathPoint P5: patella_l (0.0112991 0.0464029 -0.0154676)
      PathPoint P6: patella_l (0.00548498 0.00270958 -0.00804108)
      PathPoint P7: tibia_l (0.0406877 -0.0770953 -0.00671139)
    Thelen2003Muscle med_gas_l: max_isometric_force=1558 optimal_fiber_length=0.06449928 tendon_slack_length=0.4192453
        pennation_angle_at_optimal=0.296706
      PathPoint P1: femur_l (-0.0208429 -0.43101 0.0257794)
      ConditionalPathPoint P2: femur_l (-0.0329099 -0.441212 0.0283025) range=(-0.785398 0.174533)
          coordinate=knee_angle_l
      PathPoint P3: calcn_l (0 0.0311173 0.00532006)
    Thelen2003Muscle lat_gas_l: max_isometric_force=683 optimal_fiber_length=0.06879139 tendon_slack_length=0.4084489
        pennation_angle_at_optimal=0.1396263
      PathPoint P1: femur_l (-0.0241339 -0.432875 -0.0298383)
      ConditionalPathPoint P2: femur_l (-0.0329099 -0.440773 -0.0300577) range=(-0.785398 0.174533)
          coordinate=knee_angle_l
      PathPoint P3: calcn_l (0 0.0311173 0.00532006)
    Thelen2003Muscle soleus_l: max_isometric_force=3549 optimal_fiber_length=0.05355191 tendon_slack_length=0.2677595
        pennation_angle_at_optimal=0.4363323
      PathPoint P1: tibia_l (-0.0025813 -0.16488 -0.00763633)
      PathPoint P2: calcn_l (0 0.0311173 0.00532006)
    Thelen2003Muscle tib_post_l: max_isometric_force=1588 optimal_fiber_length=0.03305476 tendon_slack_length=0.3305476
        pennation_angle_at_optimal=0.2094395
      PathPoint P1: tibia_l (-0.0101101 -0.144983 -0.00204353)
      PathPoint P2: tibia_l (-0.0154878 -0.435701 0.0246299)
      PathPoint P3: calcn_l (0.0418578 0.0335264 0.0287082)
      PathPoint P4: calcn_l (0.0774922 0.0159602 0.0282063)
    Thelen2003Muscle flex_dig_l: max_isometric_force=310 optimal_fiber_length=0.03542249 tendon_slack_length=0.4167352
        pennation_angle_at_optimal=0.1221731
      PathPoint P1: tibia_l (-0.00892698 -0.220055 0.00193597)
      PathPoint P2: tibia_l (-0.0165633 -0.435701 0.0210806)
      PathPoint P3: calcn_l (0.043765 0.0316192 0.028106)
      PathPoint P4: calcn_l (0.071068 0.0176666 0.0263995)
      PathPoint P5: calcn_l (0.166428 -0.00813066 -0.0116439)
      PathPoint P6: toes_l (-0.00190719 -0.00782952 -0.0147556)
      PathPoint P7: toes_l (0.0286079 -0.00712687 -0.0215814)
      PathPoint P8: toes_l (0.0442669 -0.00602271 -0.0242916)
    Thelen2003Muscle flex_hal_l: max_isometric_force=322 optimal_fiber_length=0.044676 tendon_slack_length=0.3948112
        pennation_angle_at_optimal=0.1745329
      PathPoint P1: tibia_l (-0.00849676 -0.251031 -0.0262432)
      PathPoint P2: tibia_l (-0.020005 -0.438713 0.0187144)
      PathPoint P3: calcn_l (0.0375415 0.0277045 0.0241912)
      PathPoint P4: calcn_l (0.104193 0.00682574 0.0256969)
      PathPoint P5: calcn_l (0.173253 -0.00532006 0.0270018)
      PathPoint P6: toes_l (0.0155587 -0.00642422 0.0266003)
      PathPoint P7: toes_l (0.0564127 -0.0102386 0.0181685)
    Thelen2003Muscle tib_ant_l: max_isometric_force=905 optimal_fiber_length=0.1041178 tendon_slack_length=0.2369212
        pennation_angle_at_optimal=0.08726646
      PathPoint P1: tibia_l (0.0192522 -0.174668 -0.0123687)
      PathPoint P2: tibia_l (0.0353853 -0.424946 0.0190371)
      PathPoint P3: calcn_l (0.117041 0.0178674 0.0306154)
    Thelen2003Muscle per_brev_l: max_isometric_force=435 optimal_fiber_length=0.05316148 tendon_slack_length=0.17118
        pennation_angle_at_optimal=0.08726646
      PathPoint P1: tibia_l (-0.00752878 -0.284588 -0.034955)
      PathPoint P2: tibia_l (-0.0212957 -0.450006 -0.0304378)
      PathPoint P3: tibia_l (-0.0154878 -0.461944 -0.0310831)
      PathPoint P4: calcn_l (0.0472783 0.0271022 -0.0233882)
      PathPoint P5: calcn_l (0.0679562 0.0219829 -0.0344298)
    Thelen2003Muscle per_long_l: max_isometric_force=943 optimal_fiber_length=0.05171243 tendon_slack_length=0.3640977
        pennation_angle_at_optimal=0.1745329
      PathPoint P1: tibia_l (0.00053777 -0.168645 -0.0389345)
      PathPoint P2: tibia_l (-0.0222637 -0.452264 -0.0307604)
      PathPoint P3: tibia_l (-0.0174237 -0.464526 -0.0310831)
      PathPoint P4: calcn_l (0.0439658 0.023087 -0.0221836)
      PathPoint P5: calcn_l (0.0683577 0.0106401 -0.0285075)
      PathPoint P6: calcn_l (0.0855225 0.00692611 -0.0118447)
      PathPoint P7: calcn_l (0.120755 0.00853217 0.0184696)
    Thelen2003Muscle per_tert_l: max_isometric_force=180 optimal_fiber_length=0.08361432 tendon_slack_length=0.1058409
        pennation_angle_at_optimal=0.2268928
      PathPoint P1: tibia_l (0.00107554 -0.301581 -0.024845)
      PathPoint P2: tibia_l (0.0246299 -0.437637 -0.0171011)
      PathPoint P3: calcn_l (0.0860243 0.0228863 -0.0300132)
    Thelen2003Muscle ext_dig_l: max_isometric_force=512 optimal_fiber_length=0.1070414 tendon_slack_length=0.3620519
        pennation_angle_at_optimal=0.1396263
      PathPoint P1: tibia_l (0.00344173 -0.148532 -0.0296849)
      PathPoint P2: tibia_l (0.0310831 -0.430969 -0.00774389)
      PathPoint P3: calcn_l (0.0925489 0.0389468 0.000100378)
      PathPoint P4: calcn_l (0.162212 0.00552082 -0.0130492)
      PathPoint P5: toes_l (0.000301135 0.00471779 -0.0153579)
      PathPoint P6: toes_l (0.0444677 -0.000401514 -0.0250946)
    Thelen2003Muscle ext_hal_l: max_isometric_force=162 optimal_fiber_length=0.1161237 tendon_slack_length=0.3190786
        pennation_angle_at_optimal=0.1047198
      PathPoint P1: tibia_l (0.00129065 -0.190048 -0.0245223)
      PathPoint P2: tibia_l (0.0350626 -0.428603 0.00914209)
      PathPoint P3: calcn_l (0.0973671 0.0390472 0.0211799)
      PathPoint P4: calcn_l (0.129789 0.0310169 0.0257973)
      PathPoint P5: calcn_l (0.174056 0.0139526 0.028106)
      PathPoint P6: toes_l (0.0299128 0.00411552 0.0245927)
      PathPoint P7: toes_l (0.0565131 0.00341287 0.0186704)
    Thelen2003Muscle ercspn_r: max_isometric_force=2500 optimal_fiber_length=0.1215677 tendon_slack_length=0.03039192
        pennation_angle_at_optimal=0
      PathPoint P1: pelvis (-0.13858 0.0434546 0.0431577)
      PathPoint P2: torso (-0.056333 0.112303 0.0246841)
    Thelen2003Muscle ercspn_l: max_isometric_force=2500 optimal_fiber_length=0.1215677 tendon_slack_length=0.03039192
        pennation_angle_at_optimal=0
      PathPoint P1: pelvis (-0.13858 0.0434546 -0.0431577)
      PathPoint P2: torso (-0.056333 0.112303 -0.0246841)
    Thelen2003Muscle intobl_r: max_isometric_force=900 optimal_fiber_length=0.1010798 tendon_slack_length=0.1010798
        pennation_angle_at_optimal=0
      PathPoint P1: pelvis (-0.0395942 0.0692899 0.114526)
      PathPoint P2: torso (0.0716965 0.16335 0.0153635)
    Thelen2003Muscle intobl_l: max_isometric_force=900 optimal_fiber_length=0.1010798 tendon_slack_length=0.1010798
        pennation_angle_at_optimal=0
      PathPoint P1: pelvis (-0.0395942 0.0692899 -0.114526)
      PathPoint P2: torso (0.0716965 0.16335 -0.0153635)
    Thelen2003Muscle extobl_r: max_isometric_force=900 optimal_fiber_length=0.1207685 tendon_slack_length=0.1408966
        pennation_angle_at_optimal=0
      PathPoint P1: pelvis (-0.0296957 -0.0629548 0.00989855)
      PathPoint P2: torso (0.0665754 0.112303 0.112666)
    Thelen2003Muscle extobl_l: max_isometric_force=900 optimal_fiber_length=0.1207685 tendon_slack_length=0.1408966
        pennation_angle_at_optimal=0
      PathPoint P1: pelvis (-0.0296957 -0.0629548 -0.00989855)
      PathPoint P2: torso (0.0665754 0.112303 -0.112666)
    ObjectGroup R_selected_ankle_evert: members=(per_brev_r per_long_r per_tert_r ext_dig_r)
    ObjectGroup R_selected_ankle_invert: members=(tib_post_r flex_dig_r flex_hal_r tib_ant_r ext_hal_r)
    ObjectGroup R_hip_abd: members=(glut_max1_r glut_med1_r glut_med2_r glut_med3_r glut_min1_r glut_min2_r glut_min3_r peri_r sar_r tfl_r)
    ObjectGroup R_hip_flex: members=(add_brev_r add_long_r glut_med1_r glut_min1_r grac_r iliacus_r pect_r psoas_r rect_fem_r sar_r tfl_r)
    ObjectGroup R_hip_inrot: members=(glut_med1_r glut_min1_r iliacus_r psoas_r tfl_r)
    ObjectGroup R_hip_exrot: members=(gem_r glut_med3_r glut_min3_r peri_r quad_fem_r)
    ObjectGroup R_hip_ext: members=(add_long_r add_mag1_r add_mag2_r add_mag3_r bifemlh_r glut_max1_r glut_max2_r glut_max3_r glut_med3_r glut_min3_r semimem_r semiten_r)
    ObjectGroup R_hip_add: members=(add_brev_r add_long_r add_mag1_r add_mag2_r add_mag3_r bifemlh_r grac_r pect_r semimem_r semiten_r)
    ObjectGroup R_knee_bend: members=(bifemlh_r bifemsh_r grac_r lat_gas_r med_gas_r sar_r semimem_r semiten_r)
    ObjectGroup R_knee_ext: members=(rect_fem_r vas_int_r vas_lat_r vas_med_r)
    ObjectGroup R_ankle_pf: members=(flex_dig_r flex_hal_r lat_gas_r med_gas_r per_brev_r per_long_r soleus_r tib_post_r)
    ObjectGroup R_inverter: members=(ext_hal_r flex_dig_r flex_hal_r tib_ant_r tib_post_r)
    ObjectGroup R_ankle_df: members=(ext_dig_r ext_hal_r per_tert_r tib_ant_r)
    ObjectGroup R_everter: members=(ext_dig_r per_brev_r per_long_r per_tert_r)
    ObjectGroup L_hip_abd: members=(glut_max1_l glut_med1_l glut_med2_l glut_med3_l glut_min1_l glut_min2_l glut_min3_l peri_l sar_l tfl_l)
    ObjectGroup L_hip_flex: members=(add_brev_l add_long_l glut_med1_l glut_min1_l grac_l iliacus_l pect_l psoas_l rect_fem_l sar_l tfl_l)
    ObjectGroup L_hip_inrot: members=(glut_med1_l glut_min1_l iliacus_l psoas_l tfl_l)
    ObjectGroup L_hip_exrot: members=(gem_l glut_med3_l glut_min3_l peri_l quad_fem_l)
    ObjectGroup L_hip_ext: members=(add_long_l add_mag1_l add_mag2_l add_mag3_l bifemlh_l glut_max1_l glut_max2_l glut_max3_l glut_med3_l glut_min3_l semimem_l semiten_l)
    ObjectGroup L_hip_add: members=(add_brev_l add_long_l add_mag1_l add_mag2_l add_mag3_l bifemlh_l grac_l pect_l semimem_l semiten_l)
    ObjectGroup L_knee_bend: members=(bifemlh_l bifemsh_l grac_l lat_gas_l med_gas_l sar_l semimem_l semiten_l)
    ObjectGroup L_knee_ext: members=(rect_fem_l vas_int_l vas_lat_l vas_med_l)
    ObjectGroup L_ankle_pf: members=(flex_dig_l flex_hal_l lat_gas_l med_gas_l per_brev_l per_long_l soleus_l tib_post_l)
    ObjectGroup L_inverter: members=(ext_hal_l flex_dig_l flex_hal_l tib_ant_l tib_post_l)
    ObjectGroup L_ankle_df: members=(ext_dig_l ext_hal_l per_tert_l tib_ant_l)
    ObjectGroup L_everter: members=(ext_dig_l per_brev_l per_long_l per_tert_l)
    ObjectGroup back_ext: members=(ercspn_l ercspn_r)
    ObjectGroup back_rlb: members=(ercspn_r extobl_r intobl_r)
    ObjectGroup back_introt: members=(ercspn_r extobl_l intobl_r)
    ObjectGroup back_llb: members=(ercspn_l extobl_l intobl_l)
    ObjectGroup back_extrot: members=(ercspn_l extobl_r intobl_l)
    ObjectGroup back_flex: members=(extobl_l extobl_r intobl_l intobl_r)
  MarkerSet:
    Marker patella: patella_r (0.00546112 0.0026978 0)
    Marker tib_tuberosity: tibia_r (0.0409473 -0.0771828 0.000713255)
    Marker tibial_plateau_origin: tibia_r (0 -0.0270172 0)
    Marker RACR: torso (0 0.426752 0.145442)
    Marker LACR: torso (0 0.426752 -0.145442)
    Marker C7: torso (-0.0768177 0.433899 0)
    Marker CLAV: torso (0.0471149 0.393061 -0.0256059)
    Marker R.Biceps: humerus_r (0.043689 -0.163834 0)
    Marker R.Elbow: humerus_r (0.0109222 -0.306915 0.0382279)
    Marker R.MElbow: humerus_r (0 -0.306915 -0.0458734)
    Marker R.Forearm: ulna_r (0 -0.163834 0)
    Marker R.Wrist: radius_r (-0.0327667 -0.262134 0.00655335)
    Marker L.Biceps: humerus_l (0.0438798 -0.164549 0)
    Marker L.Elbow: humerus_l (0.01097 -0.308256 -0.0383949)
    Marker L.MElbow: humerus_l (0 -0.308256 0.0460738)
    Marker L.Forearm: ulna_l (0 -0.164549 0)
    Marker L.Wrist: radius_l (-0.0329099 -0.263279 -0.00658197)
    Marker RASI: pelvis (0.0128681 0.00989855 0.126701)
    Marker LASI: pelvis (0.0128681 0.00989855 -0.126701)
    Marker S2: pelvis (-0.178174 0.0247464 0)
    Marker RPSI: pelvis (-0.152438 0.0376145 0.054442)
    Marker LPSI: pelvis (-0.152438 0.0376145 -0.054442)
    Marker R_HJC: femur_r (0 0 0)
    Marker L_HJC: femur_l (0 0 0)
    Marker RTH1: femur_r (0.0195508 -0.244658 0.0706669)
    Marker RTH2: femur_r (0.0195508 -0.266503 0.0706669)
    Marker RTH3: femur_r (0.0195508 -0.288347 0.0706669)
    Marker RLFC: femur_r (0 -0.441259 0.0513346)
    Marker RMFC: femur_r (0.00546112 -0.437982 -0.0546112)
    Marker RTB1: tibia_r (0.0135086 -0.345388 0.0648414)
    Marker RTB2: tibia_r (0.0135086 -0.323775 0.0648414)
    Marker RTB3: tibia_r (0.0135086 -0.302161 0.0648414)
    Marker RLMAL: tibia_r (-0.00540345 -0.443083 0.0572765)
    Marker RMMAL: tibia_r (0.00648414 -0.420172 -0.0410662)
    Marker RTOE: calcn_r (0.198852 0.0188386 0)
    Marker RMT5: calcn_r (0.146523 0.00523295 0.0680283)
    Marker RCAL: calcn_r (-0.0313977 0.0125591 -0.0104659)
    Marker LTH1: femur_l (0.0196362 -0.245727 -0.0709756)
    Marker LTH2: femur_l (0.0196362 -0.267667 -0.0709756)
    Marker LTH3: femur_l (0.0196362 -0.289607 -0.0709756)
    Marker LLFC: femur_l (0 -0.443186 -0.0515588)
    Marker LMFC: femur_l (0.00548498 -0.439895 0.0548498)
    Marker LLMAL: tibia_l (-0.0053777 -0.442047 -0.0570036)
    Marker LTB1: tibia_l (0.0134442 -0.343743 -0.0645324)
    Marker LTB2: tibia_l (0.0134442 -0.322232 -0.0645324)
    Marker LTB3: tibia_l (0.0134442 -0.300721 -0.0645324)
    Marker LMMAL: tibia_l (0.00645324 -0.41817 0.0408705)
    Marker LTOE: calcn_l (0.190719 0.0180681 0)
    Marker LCAL: calcn_l (-0.0301135 0.0120454 0.0100378)
    Marker LMT5: calcn_l (0.14053 0.00501892 -0.065246)
  ContactGeometrySet:
    ContactHalfSpace platform_contact: body_name=platform_body location=(0 0 0) orientation=(0 0 -1.570796)
    ContactMesh foot_r: body_name=calcn_r location=(0 0 0) filename=r_foot_surface_coarse.obj
    ContactMesh foot_l: body_name=calcn_l location=(0 0 0) filename=l_foot_surface_coarse.obj
    ContactSphere heel_r: body_name=calcn_r location=(0.01 0.01 -0.005) radius=0.03
    ContactSphere ball_big_toe_r: body_name=toes_r location=(-0.005 0.005 -0.03) radius=0.02
    ContactSphere small_toe_r: body_name=toes_r location=(-0.04 0.005 0.04) radius=0.015
    ContactSphere heel_l: body_name=calcn_l location=(0.01 0.01 0.005) radius=0.03
    ContactSphere ball_big_toe_l: body_name=toes_l location=(-0.005 0.005 0.03) radius=0.02
    ContactSphere small_toe_l: body_name=toes_l location=(-0.04 0.005 -0.04) radius=0.015
